# OpenSim document version 40500
InverseKinematicsTool:
  time_range: 3.355 4.3
  output_motion_file: ik.mot
  marker_file: markers_experimental.trc
  IKTaskSet:
    IKMarkerTask FHD: apply=false weight=0.1
    IKMarkerTask LBHD: apply=false weight=0.1
    IKMarkerTask RBHD: apply=false weight=0.1
    IKMarkerTask C7: apply=true weight=10
    IKMarkerTask T10: apply=true weight=10
    IKMarkerTask CLAV: apply=false weight=0.1
    IKMarkerTask LSHO: apply=true weight=1
    IKMarkerTask LUUPA: apply=true weight=1
    IKMarkerTask LMUPA: apply=true weight=1
    IKMarkerTask LDUPA: apply=true weight=1
    IKMarkerTask LLEP: apply=true weight=1
    IKMarkerTask LMEP: apply=true weight=1
    IKMarkerTask LRAD: apply=false weight=1
    IKMarkerTask LUL: apply=false weight=1
    IKMarkerTask LRFIN: apply=false weight=1
    IKMarkerTask RSHO: apply=true weight=1
    IKMarkerTask RUPA1: apply=false weight=0.1
    IKMarkerTask RMUPA: apply=false weight=0.1
    IKMarkerTask RDUPA: apply=false weight=1
    IKMarkerTask RLEP: apply=true weight=1
    IKMarkerTask RMEP: apply=false weight=0.5
    IKMarkerTask RRAD: apply=false weight=1
    IKMarkerTask RUL: apply=true weight=1
    IKMarkerTask RUFIN: apply=false weight=1
    IKMarkerTask LASI: apply=true weight=500
    IKMarkerTask RASI: apply=false weight=500
    IKMarkerTask USACR: apply=true weight=500
    IKMarkerTask LSACR: apply=true weight=500
    IKMarkerTask RSACR: apply=true weight=500
    IKMarkerTask LHJC: apply=false weight=1
    IKMarkerTask LTHI1: apply=true weight=300
    IKMarkerTask LTHI2: apply=true weight=300
    IKMarkerTask LTHI3: apply=true weight=300
    IKMarkerTask LTHI4: apply=true weight=300
    IKMarkerTask LLFC: apply=true weight=1
    IKMarkerTask LMFC: apply=false weight=1
    IKMarkerTask LKJC: apply=false weight=1
    IKMarkerTask LTIB1: apply=true weight=300
    IKMarkerTask LTIB2: apply=true weight=300
    IKMarkerTask LTIB3: apply=true weight=300
    IKMarkerTask LTIB4: apply=true weight=300
    IKMarkerTask LLMAL: apply=false weight=1
    IKMarkerTask LMMAL: apply=false weight=1
    IKMarkerTask LAJC: apply=false weight=1
    IKMarkerTask LHEE: apply=true weight=100
    IKMarkerTask LMT1: apply=true weight=100
    IKMarkerTask LMT2: apply=true weight=100
    IKMarkerTask LMT5: apply=true weight=100
    IKMarkerTask RHJC: apply=false weight=1
    IKMarkerTask RTHI: apply=true weight=300
    IKMarkerTask RTHI2: apply=true weight=300
    IKMarkerTask RTHI3: apply=true weight=300
    IKMarkerTask RTHI4: apply=true weight=300
    IKMarkerTask RLFC: apply=false weight=1
    IKMarkerTask RMFC: apply=false weight=1
    IKMarkerTask RKJC: apply=false weight=1
    IKMarkerTask RTIB1: apply=true weight=300
    IKMarkerTask RTIB2: apply=true weight=300
    IKMarkerTask RTIB3: apply=true weight=300
    IKMarkerTask RTIB4: apply=true weight=300
    IKMarkerTask RLMAL: apply=false weight=1
    IKMarkerTask RMMAL: apply=false weight=1
    IKMarkerTask RAJC: apply=false weight=1
    IKMarkerTask RHEE: apply=true weight=100
    IKMarkerTask RMT1: apply=true weight=100
    IKMarkerTask RMT2: apply=true weight=100
    IKMarkerTask RMT5: apply=true weight=100
