# OpenSim document version 40000
ExternalLoads:
  datafile: grf.mot
  lowpass_cutoff_frequency_for_load_kinematics: 6
  ExternalForce grf_r_1: applied_to_body=calcn_r force_expressed_in_body=ground point_expressed_in_body=ground
      force_identifier=ground_force_1_v point_identifier=ground_force_1_p
  ExternalForce grf_r_2: applied_to_body=calcn_r force_expressed_in_body=ground point_expressed_in_body=ground
      force_identifier=ground_force_2_v point_identifier=ground_force_2_p
  ExternalForce grf_r_3: applied_to_body=calcn_r force_expressed_in_body=ground point_expressed_in_body=ground
      force_identifier=ground_force_3_v point_identifier=ground_force_3_p
  ExternalForce grf_r_4: applied_to_body=calcn_r force_expressed_in_body=ground point_expressed_in_body=ground
      force_identifier=ground_force_4_v point_identifier=ground_force_4_p
