# OpenSim document version 40500
InverseKinematicsTool:
  results_directory: ./
  model_file: E:\3-FatigueFAIS\MocapData\ElaboratedData\029\pre\Rajagopal2015_FAI_markerset_QF_OI22_wrapSimao2
  constraint_weight: Inf
  accuracy: 1e-5
  time_range: 2.62 3
  report_errors: true
  marker_file: markers_experimental.trc
  report_marker_locations: true
  IKTaskSet:
    IKMarkerTask FHD: apply=true weight=1
    IKMarkerTask LBHD: apply=true weight=1
    IKMarkerTask RBHD: apply=true weight=1
    IKMarkerTask C7: apply=true weight=1
    IKMarkerTask T10: apply=true weight=1
    IKMarkerTask CLAV: apply=true weight=1
    IKMarkerTask LSHO: apply=true weight=1
    IKMarkerTask LUUPA: apply=true weight=1
    IKMarkerTask LMUPA: apply=true weight=1
    IKMarkerTask LDUPA: apply=true weight=1
    IKMarkerTask LLEP: apply=false weight=1
    IKMarkerTask LMEP: apply=false weight=1
    IKMarkerTask LRAD: apply=true weight=1
    IKMarkerTask LUL: apply=false weight=1
    IKMarkerTask LRFIN: apply=true weight=1
    IKMarkerTask RSHO: apply=true weight=1
    IKMarkerTask RUPA1: apply=true weight=1
    IKMarkerTask RMUPA: apply=true weight=1
    IKMarkerTask RDUPA: apply=true weight=1
    IKMarkerTask RLEP: apply=false weight=1
    IKMarkerTask RMEP: apply=false weight=1
    IKMarkerTask RRAD: apply=true weight=1
    IKMarkerTask RUL: apply=false weight=1
    IKMarkerTask RUFIN: apply=true weight=1
    IKMarkerTask LASI: apply=true weight=10
    IKMarkerTask RASI: apply=true weight=10
    IKMarkerTask USACR: apply=true weight=10
    IKMarkerTask LSACR: apply=true weight=10
    IKMarkerTask RSACR: apply=true weight=10
    IKMarkerTask LTHI1: apply=true weight=5
    IKMarkerTask LTHI2: apply=true weight=5
    IKMarkerTask LTHI3: apply=true weight=5
    IKMarkerTask LTHI4: apply=true weight=5
    IKMarkerTask LTIB1: apply=true weight=5
    IKMarkerTask LTIB2: apply=false weight=5
    IKMarkerTask LTIB3: apply=true weight=5
    IKMarkerTask LTIB4: apply=true weight=5
    IKMarkerTask LLMAL: apply=false weight=1
    IKMarkerTask LHEE: apply=true weight=5
    IKMarkerTask LMT1: apply=true weight=5
    IKMarkerTask LMT2: apply=true weight=5
    IKMarkerTask RTHI: apply=true weight=5
    IKMarkerTask RTHI2: apply=true weight=5
    IKMarkerTask RTHI3: apply=true weight=5
    IKMarkerTask RTHI4: apply=true weight=5
    IKMarkerTask RLFC: apply=false weight=5
    IKMarkerTask RTIB1: apply=true weight=5
    IKMarkerTask RTIB2: apply=true weight=5
    IKMarkerTask RTIB3: apply=true weight=5
    IKMarkerTask RTIB4: apply=true weight=5
    IKMarkerTask RLMAL: apply=false weight=5
    IKMarkerTask RHEE: apply=true weight=5
    IKMarkerTask RMT1: apply=true weight=5
    IKMarkerTask RMT2: apply=true weight=5
    IKMarkerTask RMT5: apply=true weight=5
    IKCoordinateTask [values shared by the 11 below unless stated]: apply=false weight=0.1 value_type=default_value
        value=0
    IKCoordinateTask hip_flexion_r
    IKCoordinateTask hip_adduction_r
    IKCoordinateTask hip_rotation_r
    IKCoordinateTask knee_angle_r
    IKCoordinateTask ankle_angle_r
    IKCoordinateTask hip_flexion_l
    IKCoordinateTask hip_adduction_l
    IKCoordinateTask hip_rotation_l
    IKCoordinateTask knee_angle_l
    IKCoordinateTask ankle_angle_l
    IKCoordinateTask mtp_angle_l: weight=1
