# OpenSim document version 30000
Model 037:
  length_units: meters
  force_units: N
  gravity: 0 -9.80665 0
  credits:
    Rajagopal, A, Dembia, C.L., DeMers, M.S., Delp, D.D., Hicks, J.L., and Delp, S.L.
  publications:
    Rajagopal, Apoorva, et al. "Full-Body Musculoskeletal Model for Muscle-Driven Simulation of Human Gait." IEEE Transactions on Biomedical Engineering 63.10 (2016): 2068-2079. (2016)
  defaults:
    CoordinateActuator default: optimal_force=300
    Millard2012EquilibriumMuscle default: min_control=0.01 max_control=1 optimal_force=1 max_isometric_force=546
        optimal_fiber_length=0.0535 tendon_slack_length=0.078 pennation_angle_at_optimal=0 [radians]
        max_contraction_velocity=10
  BodySet:
    Body ground: mass=0 mass_center=(0 0 0) inertia_xx=0 inertia_yy=0 inertia_zz=0
    Body pelvis: mass=8.597834 mass_center=(-0.0693656 0 0) inertia_xx=0.07440015 inertia_yy=0.07440015
        inertia_zz=0.03885972 meshes=(Raja\r_pelvis.vtp Raja\l_pelvis.vtp Raja\sacrum.vtp)
      CustomJoint ground_pelvis: parent_body=ground location_in_parent=(0 0 0) location=(0 0 0)
        Coordinate pelvis_tilt: motion_type=rotational default_value=0 range=(-1.570796 1.570796) clamped=true
        Coordinate pelvis_list: motion_type=rotational default_value=0 range=(-1.570796 1.570796) clamped=true
        Coordinate pelvis_rotation: motion_type=rotational default_value=0 range=(-1.570796 1.570796) clamped=true
        Coordinate pelvis_tx: motion_type=translational default_value=0 range=(-5 5) clamped=true
        Coordinate pelvis_ty: motion_type=translational default_value=0.94 range=(-1 2) clamped=true
        Coordinate pelvis_tz: motion_type=translational default_value=0 range=(-3 3) clamped=true
        SpatialTransform:
          TransformAxis rotation1: coordinates=pelvis_tilt axis=(0 0 1) LinearFunction(coefficients=1 0)
          TransformAxis rotation2: coordinates=pelvis_list axis=(1 0 0) LinearFunction(coefficients=1 0)
          TransformAxis rotation3: coordinates=pelvis_rotation axis=(0 1 0) LinearFunction(coefficients=1 0)
          TransformAxis translation1: coordinates=pelvis_tx axis=(1 0 0) LinearFunction(coefficients=1 0)
          TransformAxis translation2: coordinates=pelvis_ty axis=(0 1 0) LinearFunction(coefficients=1 0)
          TransformAxis translation3: coordinates=pelvis_tz axis=(0 0 1) LinearFunction(coefficients=1 0)
      WrapCylinder Gmax1_at_pelvis_r: xyz_body_rotation=(-0.6 0.45 0.5) translation=(-0.0598487 -0.0726179 0.090877)
          quadrant=-x radius=0.03788531 length=0.1183202
      WrapEllipsoid Gmax2_at_pelvis_r: xyz_body_rotation=(-0.5 0.39 0) translation=(-0.0569053 -0.0402912 0.090877)
          quadrant=all dimensions=(0.0658559 0.0639324 0.0991718)
      WrapCylinder Gmax3_at_pelvis_r: xyz_body_rotation=(-0.1 0 0) translation=(-0.0814334 -0.0824565 0.0686626)
          quadrant=all radius=0.03837768 length=0.1009046
      WrapCylinder Gmax1_at_pelvis_l: xyz_body_rotation=(0.6 -0.45 0.5) translation=(-0.0598487 -0.0726179 -0.090877)
          quadrant=-x radius=0.03788531 length=0.1183202
      WrapEllipsoid Gmax2_at_pelvis_l: xyz_body_rotation=(0.5 -0.39 0) translation=(-0.0569053 -0.0402912 -0.090877)
          quadrant=all dimensions=(0.0658559 0.0639324 0.0991718)
      WrapCylinder Gmax3_at_pelvis_l: xyz_body_rotation=(0.1 0 0) translation=(-0.0814334 -0.0824565 -0.0686626)
          quadrant=all radius=0.03837768 length=0.1009046
      WrapCylinder PS_at_brim_r: xyz_body_rotation=(-0.25 -0.27 0.1) translation=(-0.0726033 -0.0562203 0.0662393)
          quadrant=-y radius=0.04811377 length=0.1003733
      WrapCylinder PS_at_brim_l: xyz_body_rotation=(0.25 0.27 0.1) translation=(-0.0726033 -0.0562203 -0.0662393)
          quadrant=-y radius=0.04811377 length=0.1003733
      WrapCylinder IL_at_brim_r: xyz_body_rotation=(-0.32 -0.24 0.9) translation=(-0.0696599 -0.0609054 0.0763367)
          quadrant=-y radius=0.0528988 length=0.1001571
      WrapCylinder IL_at_brim_l: xyz_body_rotation=(0.32 0.24 0.9) translation=(-0.0696599 -0.0609054 -0.0763367)
          quadrant=-y radius=0.0528988 length=0.1001571
      WrapCylinder OI_at_Ischium: xyz_body_rotation=(1.7 0 1.5) translation=(-0.0849655 -0.074773 0.0588681) quadrant=y
          radius=0.0218868 length=0.0938259
      WrapCylinder PIRI_at_Ischium: xyz_body_rotation=(1.7 0 1.5) translation=(-0.0849655 -0.074773 0.0588681)
          quadrant=y radius=0.0218868 length=0.0938259
      WrapCylinder Gmed_at_pelvis_r: xyz_body_rotation=(-1 0.6 0.7) translation=(-0.0294338 -0.0515353 0.100974)
          quadrant=-x radius=0.03925787 length=0.1448971
      WrapCylinder Gmed_at_pelvis_l: xyz_body_rotation=(1 -0.6 0.7) translation=(-0.0294338 -0.0515353 -0.100974)
          quadrant=-x radius=0.03925787 length=0.1448971
      WrapCylinder Post_at_pelvis_r: xyz_body_rotation=(-0.1 0 0) translation=(-0.0588675 -0.0655904 0.0686626)
          quadrant=all radius=0.03837768 length=0.1210855
      WrapCylinder Post_at_pelvis_l: xyz_body_rotation=(0.1 0 0) translation=(-0.0588675 -0.0655904 -0.0686626)
          quadrant=all radius=0.03837768 length=0.1210855
    Body femur_r: mass=6.790515 mass_center=(0 -0.170041 0) inertia_xx=0.09780139 inertia_yy=0.02563726
        inertia_zz=0.1031334 meshes=Raja\r_femur.vtp
      CustomJoint hip_r: parent_body=pelvis location_in_parent=(-0.05521382 -0.07354556 0.07801288) location=(0 0 0)
        Coordinate hip_flexion_r: motion_type=rotational default_value=0 range=(-0.5235988 2.094395) clamped=true
        Coordinate hip_adduction_r: motion_type=rotational default_value=0 range=(-0.8726646 0.5235988) clamped=true
        Coordinate hip_rotation_r: motion_type=rotational default_value=0 range=(-0.6981317 0.6981317) clamped=true
        SpatialTransform: axes_held_at_zero=(translation1 translation2 translation3)
          TransformAxis rotation1: coordinates=hip_flexion_r axis=(0 0 1) LinearFunction(coefficients=1 0)
          TransformAxis rotation2: coordinates=hip_adduction_r axis=(1 0 0) LinearFunction(coefficients=1 0)
          TransformAxis rotation3: coordinates=hip_rotation_r axis=(0 1 0) LinearFunction(coefficients=1 0)
      WrapCylinder Gastroc_at_condyles_r: translation=(0.00500121 -0.410099 0) quadrant=all radius=0.02500605
          length=0.1000242
      WrapCylinder KnExt_at_fem_r: xyz_body_rotation=(-0.0623366 0.0507601 0)
          translation=(-0.00190046 -0.402829 0.00209162) quadrant=all radius=0.03000726 length=0.1000242
      WrapCylinder KnExtVL_at_fem_r: xyz_body_rotation=(-0.0623366 0.0507601 0)
          translation=(-0.00400097 -0.402829 0.00209162) quadrant=all radius=0.03000726 length=0.1000242
      WrapCylinder AB_at_femshaft_r: xyz_body_rotation=(1.66157 0.186644 0) translation=(0.0146469 -0.112622 0.0233707)
          quadrant=all radius=0.01650399 length=0.07001693
      WrapCylinder AL_at_femshaft_r: xyz_body_rotation=(1.77711 0.136489 0) translation=(0.0307401 -0.231965 0.0151174)
          quadrant=all radius=0.02010486 length=0.1000242
      WrapCylinder AMprox_at_femshaft_r: xyz_body_rotation=(1.61126 0.18656 0)
          translation=(0.00518424 -0.0729124 0.0254091) quadrant=all radius=0.0211051 length=0.07001693
      WrapCylinder AMmid_at_femshaft_r: xyz_body_rotation=(1.61139 0.13656 0)
          translation=(0.0230181 -0.16075 0.0205892) quadrant=all radius=0.02140518 length=0.120029
      WrapCylinder AMdist_at_femshaft_r: xyz_body_rotation=(1.71188 0.186636 0)
          translation=(0.0316141 -0.260799 0.00936687) quadrant=all radius=0.02180527 length=0.2000484
      WrapCylinder AMisch_at_condyles_r: xyz_body_rotation=(1.71115 -0.463363 0)
          translation=(-0.0226566 -0.376922 -0.00315513) quadrant=all radius=0.04000968 length=0.2400581
      WrapCylinder PECT_at_femshaft_r: xyz_body_rotation=(1.81295 0.276344 0)
          translation=(0.0060872 -0.0845233 0.0304479) quadrant=all radius=0.01500363 length=0.0500121
      WrapCylinder Flex_at_femhead_r: translation=(-0.00500121 0 0.0100024) quadrant=all radius=0.02400581
          length=0.06001451
    Body tibia_r: mass=2.706671 mass_center=(0 -0.174558 0) inertia_xx=0.03216452 inertia_yy=0.003254743
        inertia_zz=0.03261125 meshes=(Raja\r_tibia.vtp Raja\r_fibula.vtp)
      CustomJoint walker_knee_r: parent_body=femur_r location_in_parent=(-0.008091957 -0.4080587 -0.002750665)
          orientation_in_parent=(-1.641568 1.446181 1.570796) location=(-0.00756345 -0.00330492 -0.001388182)
          orientation=(-1.641568 1.446181 1.570796)
        Coordinate knee_angle_r: motion_type=rotational default_value=0 range=(0 2.793) clamped=true
        SpatialTransform: axes_held_at_zero=translation3
          TransformAxis rotation1: coordinates=knee_angle_r axis=(1 0 0) LinearFunction(coefficients=1 0)
          TransformAxis rotation2: coordinates=knee_angle_r axis=(0 0 1)
            SimmSpline: x=(0 0.174533 0.349066 0.523599 0.698132 0.872665 1.0472 1.22173 1.39626 1.5708 1.74533 1.91986 2.0944)
                y=(0 0.0126809 0.0226969 0.0296054 0.0332049 0.0335354 0.0308779 0.0257548 0.0189295 0.011407 0.00443314 -0.00050475 -0.0016782)
          TransformAxis rotation3: coordinates=knee_angle_r axis=(0 1 0)
            SimmSpline: x=(0 0.174533 0.349066 0.523599 0.698132 0.872665 1.0472 1.22173 1.39626 1.5708 1.74533 1.91986 2.0944)
                y=(0 0.059461 0.109399 0.150618 0.18392 0.210107 0.229983 0.24435 0.254012 0.25977 0.262428 0.262788 0.261654)
          TransformAxis translation1: coordinates=knee_angle_r axis=(0 1 0)
            MultiplierFunction: scale=1.000242
              SimmSpline: x=(0 0.174533 0.349066 0.523599 0.698132 0.872665 1.0472 1.22173 1.39626 1.5708 1.74533 1.91986 2.0944)
                  y=(0 0.000479 0.000835 0.001086 0.001251 0.001346 0.001391 0.001403 0.0014 0.0014 0.001421 0.001481 0.001599)
          TransformAxis translation2: coordinates=knee_angle_r axis=(0 0 1)
            MultiplierFunction: scale=1.000242
              SimmSpline: x=(0 0.174533 0.349066 0.523599 0.698132 0.872665 1.0472 1.22173 1.39626 1.5708 1.74533 1.91986 2.0944)
                  y=(0 0.000988 0.001899 0.002734 0.003492 0.004173 0.004777 0.005305 0.005756 0.00613 0.006427 0.006648 0.006792)
      WrapCylinder GasLat_at_shank_r: xyz_body_rotation=(2.96723 -0.279725 -1.47812)
          translation=(-0.00691875 -0.0691875 -0.00308539) quadrant=-y radius=0.05142316 length=0.09349666
      WrapCylinder GasMed_at_shank_r: xyz_body_rotation=(2.96723 0.0279725 -1.47812)
          translation=(-0.00691875 -0.0691875 -0.00308539) quadrant=-y radius=0.05142316 length=0.09349666
      WrapCylinder GR_at_condyles_r: xyz_body_rotation=(0 -0.4 0) translation=(-0.0028049 -0.0186993 0) quadrant=all
          radius=0.0336588 length=0.09349666
      WrapCylinder SM_at_condyles_r: xyz_body_rotation=(0 -0.1 0) translation=(-0.000934967 -0.0186993 0) quadrant=all
          radius=0.03291082 length=0.09349666
      WrapCylinder ST_at_condyles_r: xyz_body_rotation=(0 -0.2 0) translation=(-0.00186993 -0.0191668 0) quadrant=all
          radius=0.03973608 length=0.09349666
      WrapCylinder BF_at_gastroc_r: translation=(-0.0542281 -0.056098 0) quadrant=y radius=0.028049 length=0.140245
    Body patella_r: mass=0.06293057 mass_center=(0.0018 0.0264 0) inertia_xx=2.095252e-6 inertia_yy=9.570994e-6
        inertia_zz=9.570994e-6 meshes=Raja\r_patella.vtp
      CustomJoint patellofemoral_r: parent_body=femur_r location_in_parent=(-0.008091957 -0.4080587 -0.002750665)
          location=(0 0 0)
        Coordinate knee_angle_r_beta: motion_type=rotational default_value=0 range=(-99999.9 99999.9) clamped=false
        SpatialTransform: axes_held_at_zero=(rotation2 rotation3)
          TransformAxis rotation1: coordinates=knee_angle_r_beta axis=(0 0 1)
            SimmSpline f11: x=(0 0.174533 0.349066 0.523599 0.698132 0.872665 1.0472 1.22173 1.39626 1.5708 1.74533 1.91986 2.0944)
                y=(0.00113686 -0.00629212 -0.105582 -0.253683 -0.414245 -0.579047 -0.747244 -0.91799 -1.09044 -1.26379 -1.43763 -1.61186 -1.78634)
          TransformAxis translation1: coordinates=knee_angle_r_beta axis=(1 0 0)
            MultiplierFunction: scale=1.000242
              SimmSpline f9: x=(0 0.174533 0.349066 0.523599 0.698132 0.872665 1.0472 1.22173 1.39626 1.5708 1.74533 1.91986 2.0944)
                  y=(0.0524 0.0488 0.0437 0.0371 0.0296 0.0216 0.0136 0.0057 -0.0019 -0.0088 -0.0148 -0.0196 -0.0227)
          TransformAxis translation2: coordinates=knee_angle_r_beta axis=(0 1 0)
            MultiplierFunction: scale=1.000242
              SimmSpline f10: x=(0 0.174533 0.349066 0.523599 0.698132 0.872665 1.0472 1.22173 1.39626 1.5708 1.74533 1.91986 2.0944)
                  y=(-0.0108 -0.019 -0.0263 -0.0322 -0.0367 -0.0395 -0.0408 -0.0404 -0.0384 -0.0349 -0.0301 -0.0245 -0.0187)
          TransformAxis translation3: axis=(0 0 1) MultiplierFunction(scale=1.000242, Constant(value=0.00275))
    Body talus_r: mass=0.0730053 mass_center=(0 0 0) inertia_xx=0.0006525933 inertia_yy=0.0006525933
        inertia_zz=0.0006525933 meshes=Raja\r_talus.vtp
      PinJoint ankle_r: parent_body=tibia_r location_in_parent=(-0.009349666 -0.3739866 0)
          orientation_in_parent=(0.1758952 -0.105208 0.01866219) location=(0 0 0)
          orientation=(0.1758952 -0.105208 0.01866219)
        Coordinate ankle_angle_r: motion_type=rotational default_value=0 range=(-0.6981317 0.8726646) clamped=true
    Body calcn_r: mass=0.9125662 mass_center=(0.0945462 0.0283639 0) inertia_xx=0.0009136306 inertia_yy=0.002545114
        inertia_zz=0.002675632 meshes=Raja\r_foot.vtp
      PinJoint subtalar_r: parent_body=talus_r location_in_parent=(-0.04611019 -0.03966213 0.00748806)
          orientation_in_parent=(-1.768191 0.906223 1.819602) location=(0 0 0)
          orientation=(-1.768191 0.906223 1.819602)
        Coordinate subtalar_angle_r: motion_type=rotational default_value=0 range=(-0.3490659 0.3490659) clamped=true
            locked=true
    Body toes_r: mass=0.1581295 mass_center=(0.032713 0.00567277 -0.0165456) inertia_xx=6.525933e-5
        inertia_yy=0.0001305187 inertia_zz=0.0006525933 meshes=Raja\r_bofoot.vtp
      PinJoint mtp_r: parent_body=calcn_r location_in_parent=(0.1690486 -0.001890924 0.001021099)
          orientation_in_parent=(-3.141593 0.6199005 0) location=(0 0 0) orientation=(-3.141593 0.6199005 0)
        Coordinate mtp_angle_r: motion_type=rotational default_value=0 range=(-0.5235988 0.5235988) clamped=true
            locked=true
    Body femur_l: mass=6.790515 mass_center=(0 -0.168734 0) inertia_xx=0.09630402 inertia_yy=0.02524474
        inertia_zz=0.1015544 meshes=Raja\l_femur.vtp
      CustomJoint hip_l: parent_body=pelvis location_in_parent=(-0.05521382 -0.07354556 -0.07801288) location=(0 0 0)
        Coordinate hip_flexion_l: motion_type=rotational default_value=0 range=(-0.5235988 2.094395) clamped=true
        Coordinate hip_adduction_l: motion_type=rotational default_value=0 range=(-0.8726646 0.5235988) clamped=true
        Coordinate hip_rotation_l: motion_type=rotational default_value=0 range=(-0.6981317 0.6981317) clamped=true
        SpatialTransform: axes_held_at_zero=(translation1 translation2 translation3)
          TransformAxis rotation1: coordinates=hip_flexion_l axis=(0 0 1) LinearFunction(coefficients=1 0)
          TransformAxis rotation2: coordinates=hip_adduction_l axis=(1 0 0) LinearFunction(coefficients=-1 0)
          TransformAxis rotation3: coordinates=hip_rotation_l axis=(0 1 0) LinearFunction(coefficients=-1 0)
      WrapCylinder Gastroc_at_condyles_l: translation=(0.00496278 -0.406948 0) quadrant=all radius=0.02481388
          length=0.09925554
      WrapCylinder KnExt_at_fem_l: xyz_body_rotation=(0.0623366 -0.0507601 0)
          translation=(0.00356157 -0.399734 -0.00207554) quadrant=all radius=0.02481388 length=0.09925554
      WrapCylinder KnExtVL_at_fem_l: xyz_body_rotation=(0.0623366 -0.0507601 0)
          translation=(-0.00397022 -0.399734 -0.00207554) quadrant=all radius=0.02977666 length=0.09925554
      WrapCylinder AB_at_femshaft_l: xyz_body_rotation=(-1.66157 -0.186644 0)
          translation=(0.0145344 -0.111757 -0.0231911) quadrant=all radius=0.01637716 length=0.06947887
      WrapCylinder AL_at_femshaft_l: xyz_body_rotation=(-1.77711 -0.136489 0)
          translation=(0.0305039 -0.230183 -0.0150012) quadrant=all radius=0.01995036 length=0.09925554
      WrapCylinder AMprox_at_femshaft_l: xyz_body_rotation=(-1.61126 -0.18656 0)
          translation=(0.0051444 -0.0723521 -0.0252139) quadrant=all radius=0.02094292 length=0.06947887
      WrapCylinder AMmid_at_femshaft_l: xyz_body_rotation=(-1.61139 -0.13656 0)
          translation=(0.0228412 -0.159515 -0.020431) quadrant=all radius=0.02124068 length=0.1191066
      WrapCylinder AMdist_at_femshaft_l: xyz_body_rotation=(-1.71188 -0.186636 0)
          translation=(0.0313712 -0.258795 -0.00929488) quadrant=all radius=0.02163771 length=0.1985111
      WrapCylinder AMisch_at_condyles_l: xyz_body_rotation=(-1.71115 0.463363 0)
          translation=(-0.0224825 -0.374026 0.00313089) quadrant=all radius=0.03970221 length=0.2382133
      WrapCylinder PECT_at_femshaft_l: xyz_body_rotation=(-1.81295 -0.276344 0)
          translation=(0.00604042 -0.0838738 -0.0302139) quadrant=all radius=0.01488833 length=0.04962777
      WrapCylinder Flex_at_femhead_l: translation=(-0.00496278 0 -0.00992555) quadrant=all radius=0.02382133
          length=0.05955332
    Body tibia_l: mass=2.706671 mass_center=(0 -0.177458 0) inertia_xx=0.03324198 inertia_yy=0.003363772
        inertia_zz=0.03370368 meshes=(Raja\l_tibia.vtp Raja\l_fibula.vtp)
      CustomJoint walker_knee_l: parent_body=femur_l location_in_parent=(-0.008029773 -0.4049229 0.002729527)
          orientation_in_parent=(1.641568 -1.446181 1.570796) location=(-0.007689088 -0.003359819 0.001411242)
          orientation=(1.641568 -1.446181 1.570796)
        Coordinate knee_angle_l: motion_type=rotational default_value=0 range=(0 2.793) clamped=true
        SpatialTransform: axes_held_at_zero=translation3
          TransformAxis rotation1: coordinates=knee_angle_l axis=(-1 0 0) LinearFunction(coefficients=1 0)
          TransformAxis rotation2: coordinates=knee_angle_l axis=(0 0 1)
            SimmSpline: x=(0 0.174533 0.349066 0.523599 0.698132 0.872665 1.0472 1.22173 1.39626 1.5708 1.74533 1.91986 2.0944)
                y=(0 0.0126809 0.0226969 0.0296054 0.0332049 0.0335354 0.0308779 0.0257548 0.0189295 0.011407 0.00443314 -0.00050475 -0.0016782)
          TransformAxis rotation3: coordinates=knee_angle_l axis=(0 1 0)
            SimmSpline: x=(0 0.174533 0.349066 0.523599 0.698132 0.872665 1.0472 1.22173 1.39626 1.5708 1.74533 1.91986 2.0944)
                y=(0 -0.059461 -0.109399 -0.150618 -0.18392 -0.210107 -0.229983 -0.24435 -0.254012 -0.25977 -0.262428 -0.262788 -0.261654)
          TransformAxis translation1: coordinates=knee_angle_l axis=(0 1 0)
            MultiplierFunction: scale=0.9925554
              SimmSpline: x=(0 0.174533 0.349066 0.523599 0.698132 0.872665 1.0472 1.22173 1.39626 1.5708 1.74533 1.91986 2.0944)
                  y=(0 0.000479 0.000835 0.001086 0.001251 0.001346 0.001391 0.001403 0.0014 0.0014 0.001421 0.001481 0.001599)
          TransformAxis translation2: coordinates=knee_angle_l axis=(0 0 1)
            MultiplierFunction: scale=0.9925554
              SimmSpline: x=(0 0.174533 0.349066 0.523599 0.698132 0.872665 1.0472 1.22173 1.39626 1.5708 1.74533 1.91986 2.0944)
                  y=(0 -0.000988 -0.001899 -0.002734 -0.003492 -0.004173 -0.004777 -0.005305 -0.005756 -0.00613 -0.006427 -0.006648 -0.006792)
      WrapCylinder GasLat_at_shank_l: xyz_body_rotation=(-2.96723 0.279725 -1.47812)
          translation=(-0.00703368 -0.0703368 0.00313664) quadrant=-y radius=0.05227737 length=0.09504976
      WrapCylinder GasMed_at_shank_l: xyz_body_rotation=(-2.96723 -0.0279725 -1.47812)
          translation=(-0.00703368 -0.0703368 0.00313664) quadrant=-y radius=0.05227737 length=0.09504976
      WrapCylinder GR_at_condyles_l: xyz_body_rotation=(0 0.4 0) translation=(-0.00285149 -0.01901 0) quadrant=all
          radius=0.03421791 length=0.09504976
      WrapCylinder SM_at_condyles_l: xyz_body_rotation=(0 0.1 0) translation=(-0.000950498 -0.01901 0) quadrant=all
          radius=0.03345751 length=0.09504976
      WrapCylinder ST_at_condyles_l: xyz_body_rotation=(0 0.2 0) translation=(-0.001901 -0.0194852 0) quadrant=all
          radius=0.04039615 length=0.09504976
      WrapCylinder BF_at_gastroc_l: translation=(-0.0551289 -0.0570299 0) quadrant=all radius=0.02851493
          length=0.1425746
    Body patella_l: mass=0.06293057 mass_center=(0.0018 0.0264 0) inertia_xx=2.095252e-6 inertia_yy=9.570994e-6
        inertia_zz=9.570994e-6 meshes=Raja\l_patella.vtp
      CustomJoint patellofemoral_l: parent_body=femur_l location_in_parent=(-0.008029773 -0.4049229 0.002729527)
          location=(0 0 0)
        Coordinate knee_angle_l_beta: motion_type=rotational default_value=0 range=(-99999.9 99999.9) clamped=false
        SpatialTransform: axes_held_at_zero=(rotation2 rotation3)
          TransformAxis rotation1: coordinates=knee_angle_l_beta axis=(0 0 1)
            SimmSpline f25: x=(0 0.174533 0.349066 0.523599 0.698132 0.872665 1.0472 1.22173 1.39626 1.5708 1.74533 1.91986 2.0944)
                y=(0.00113686 -0.00629212 -0.105582 -0.253683 -0.414245 -0.579047 -0.747244 -0.91799 -1.09044 -1.26379 -1.43763 -1.61186 -1.78634)
          TransformAxis translation1: coordinates=knee_angle_l_beta axis=(1 0 0)
            MultiplierFunction: scale=0.9925554
              SimmSpline f23: x=(0 0.174533 0.349066 0.523599 0.698132 0.872665 1.0472 1.22173 1.39626 1.5708 1.74533 1.91986 2.0944)
                  y=(0.0524 0.0488 0.0437 0.0371 0.0296 0.0216 0.0136 0.0057 -0.0019 -0.0088 -0.0148 -0.0196 -0.0227)
          TransformAxis translation2: coordinates=knee_angle_l_beta axis=(0 1 0)
            MultiplierFunction: scale=0.9925554
              SimmSpline f24: x=(0 0.174533 0.349066 0.523599 0.698132 0.872665 1.0472 1.22173 1.39626 1.5708 1.74533 1.91986 2.0944)
                  y=(-0.0108 -0.019 -0.0263 -0.0322 -0.0367 -0.0395 -0.0408 -0.0404 -0.0384 -0.0349 -0.0301 -0.0245 -0.0187)
          TransformAxis translation3: axis=(0 0 1) MultiplierFunction(scale=0.9925554, Constant(value=-0.00275))
    Body talus_l: mass=0.0730053 mass_center=(0 0 0) inertia_xx=0.0006256317 inertia_yy=0.0006256317
        inertia_zz=0.0006256317 meshes=Raja\l_talus.vtp
      PinJoint ankle_l: parent_body=tibia_l location_in_parent=(-0.009504976 -0.380199 0)
          orientation_in_parent=(-0.1758952 0.105208 0.01866219) location=(0 0 0)
          orientation=(-0.1758952 0.105208 0.01866219)
        Coordinate ankle_angle_l: motion_type=rotational default_value=0 range=(-0.6981317 0.8726646) clamped=true
    Body calcn_l: mass=0.9125662 mass_center=(0.0925725 0.0277718 0) inertia_xx=0.0008758844 inertia_yy=0.002439964
        inertia_zz=0.00256509 meshes=Raja\l_foot.vtp
      PinJoint subtalar_l: parent_body=talus_l location_in_parent=(-0.04514763 -0.03883418 -0.007331745)
          orientation_in_parent=(1.768191 -0.906223 1.819602) location=(0 0 0)
          orientation=(1.768191 -0.906223 1.819602)
        Coordinate subtalar_angle_l: motion_type=rotational default_value=0 range=(-0.3490659 0.3490659) clamped=true
            locked=true
    Body toes_l: mass=0.1581295 mass_center=(0.0320301 0.00555435 0.0162002) inertia_xx=6.256317e-5
        inertia_yy=0.0001251263 inertia_zz=0.0006256317 meshes=Raja\l_bofoot.vtp
      PinJoint mtp_l: parent_body=calcn_l location_in_parent=(0.1655197 -0.001851451 -0.0009997835)
          orientation_in_parent=(-3.141593 -0.6199005 0) location=(0 0 0) orientation=(-3.141593 -0.6199005 0)
        Coordinate mtp_angle_l: motion_type=rotational default_value=0 range=(-0.5235988 0.5235988) clamped=true
            locked=true
    Body torso: mass=19.58484 mass_center=(-0.0290866 0.310258 0) inertia_xx=1.011915 inertia_yy=0.5184818
        inertia_zz=0.982336 meshes=(Raja\hat_spine.vtp Raja\hat_jaw.vtp Raja\hat_skull.vtp Raja\hat_ribs_scap.vtp)
      CustomJoint back: parent_body=pelvis location_in_parent=(-0.09879935 0.07636594 0) location=(0 0 0)
        Coordinate lumbar_extension: motion_type=rotational default_value=0 range=(-1.570796 1.570796) clamped=true
        Coordinate lumbar_bending: motion_type=rotational default_value=0 range=(-1.570796 1.570796) clamped=true
        Coordinate lumbar_rotation: motion_type=rotational default_value=0 range=(-1.570796 1.570796) clamped=true
        SpatialTransform: axes_held_at_zero=(translation1 translation2 translation3)
          TransformAxis rotation1: coordinates=lumbar_extension axis=(0 0 1) LinearFunction(coefficients=1 0)
          TransformAxis rotation2: coordinates=lumbar_bending axis=(1 0 0) LinearFunction(coefficients=1 0)
          TransformAxis rotation3: coordinates=lumbar_rotation axis=(0 1 0) LinearFunction(coefficients=1 0)
    Body humerus_r: mass=1.483833 mass_center=(0 -0.160046 0) inertia_xx=0.008255116 inertia_yy=0.002847759
        inertia_zz=0.009266102 meshes=Raja\humerus_rv.vtp
      CustomJoint acromial_r: parent_body=torso location_in_parent=(0.003058945 0.3601896 0.1648243) location=(0 0 0)
        Coordinate arm_flex_r: motion_type=rotational default_value=0 range=(-1.570796 1.570796) clamped=true
        Coordinate arm_add_r: motion_type=rotational default_value=0 range=(-2.094395 1.570796) clamped=true
        Coordinate arm_rot_r: motion_type=rotational default_value=0 range=(-1.570796 1.570796) clamped=true
        SpatialTransform: axes_held_at_zero=(translation1 translation2 translation3)
          TransformAxis rotation1: coordinates=arm_flex_r axis=(0 0 1) LinearFunction(coefficients=1 0)
          TransformAxis rotation2: coordinates=arm_add_r axis=(1 0 0) LinearFunction(coefficients=1 0)
          TransformAxis rotation3: coordinates=arm_rot_r axis=(0 1 0) LinearFunction(coefficients=1 0)
    Body ulna_r: mass=0.4435072 mass_center=(0 -0.118613 0) inertia_xx=0.002094365 inertia_yy=0.0004369742
        inertia_zz=0.002271842 meshes=Raja\ulna_rv.vtp
      PinJoint elbow_r: parent_body=humerus_r location_in_parent=(0.01278794 -0.2785182 -0.009335082)
          orientation_in_parent=(-0.02286271 0.2280177 0.005168901) location=(0 0 0)
          orientation=(-0.02286271 0.2280177 0.005168901)
        Coordinate elbow_flex_r: motion_type=rotational default_value=0 range=(0 2.618) clamped=true
    Body radius_r: mass=0.4435072 mass_center=(0 -0.118613 0) inertia_xx=0.002094365 inertia_yy=0.0004369742
        inertia_zz=0.002271842 meshes=Raja\radius_rv.vtp
      PinJoint radioulnar_r: parent_body=ulna_r location_in_parent=(-0.006620304 -0.0128007 0.0256693)
          orientation_in_parent=(-1.568841 0.05642797 1.536144) location=(0 0 0)
          orientation=(-1.568841 0.05642797 1.536144)
        Coordinate pro_sup_r: motion_type=rotational default_value=0 range=(0 1.570796) clamped=true
    Body hand_r: mass=0.3339992 mass_center=(0 -0.0700207 0) inertia_xx=0.0006885608 inertia_yy=0.0004222452
        inertia_zz=0.001034385
        meshes=(Raja\pisiform_rvs.vtp Raja\lunate_rvs.vtp Raja\scaphoid_rvs.vtp Raja\triquetrum_rvs.vtp Raja\hamate_rvs.vtp Raja\capitate_rvs.vtp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)
      UniversalJoint radius_hand_r: parent_body=radius_r location_in_parent=(-0.008657472 -0.2321004 0.01339413)
          orientation_in_parent=(-1.570796 0 -1.570796) location=(0 0 0) orientation=(-1.570796 0 -1.570796)
        Coordinate wrist_flex_r: motion_type=rotational default_value=0 range=(-1.22173 1.22173) clamped=true
            locked=true
        Coordinate wrist_dev_r: motion_type=rotational default_value=0 range=(-0.4363323 0.6108652) clamped=true
            locked=true
    Body humerus_l: mass=1.483833 mass_center=(0 -0.157089 0) inertia_xx=0.007952936 inertia_yy=0.002743516
        inertia_zz=0.008926914 meshes=Raja\humerus_lv.vtp
      CustomJoint acromial_l: parent_body=torso location_in_parent=(0.003058945 0.3601896 -0.1648243) location=(0 0 0)
        Coordinate arm_flex_l: motion_type=rotational default_value=0 range=(-1.570796 1.570796) clamped=true
        Coordinate arm_add_l: motion_type=rotational default_value=0 range=(-2.094395 1.570796) clamped=true
        Coordinate arm_rot_l: motion_type=rotational default_value=0 range=(-1.570796 1.570796) clamped=true
        SpatialTransform: axes_held_at_zero=(translation1 translation2 translation3)
          TransformAxis rotation1: coordinates=arm_flex_l axis=(0 0 1) LinearFunction(coefficients=1 0)
          TransformAxis rotation2: coordinates=arm_add_l axis=(-1 0 0) LinearFunction(coefficients=1 0)
          TransformAxis rotation3: coordinates=arm_rot_l axis=(0 -1 0) LinearFunction(coefficients=1 0)
    Body ulna_l: mass=0.4435072 mass_center=(0 -0.117079 0) inertia_xx=0.002040525 inertia_yy=0.0004257408
        inertia_zz=0.002213439 meshes=Raja\ulna_lv.vtp
      PinJoint elbow_l: parent_body=humerus_l location_in_parent=(0.01255171 -0.273373 0.009162633)
          orientation_in_parent=(0.02286271 -0.2280177 0.005168901) location=(0 0 0)
          orientation=(0.02286271 -0.2280177 0.005168901)
        Coordinate elbow_flex_l: motion_type=rotational default_value=0 range=(0 2.618) clamped=true
    Body radius_l: mass=0.4435072 mass_center=(0 -0.117079 0) inertia_xx=0.002040525 inertia_yy=0.0004257408
        inertia_zz=0.002213439 meshes=Raja\radius_lv.vtp
      PinJoint radioulnar_l: parent_body=ulna_l location_in_parent=(-0.006534655 -0.01263509 -0.02533721)
          orientation_in_parent=(1.568841 -0.05642797 1.536144) location=(0 0 0)
          orientation=(1.568841 -0.05642797 1.536144)
        Coordinate pro_sup_l: motion_type=rotational default_value=0 range=(0 1.570796) clamped=true
    Body hand_l: mass=0.3339992 mass_center=(0 -0.0700207 0) inertia_xx=0.0006885608 inertia_yy=0.0004222452
        inertia_zz=0.001034385
        meshes=(Raja\pisiform_lvs.vtp Raja\lunate_lvs.vtp Raja\scaphoid_lvs.vtp Raja\triquetrum_lvs.vtp Raja\hamate_lvs.vtp Raja\capitate_lvs.vtp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)
      UniversalJoint radius_hand_l: parent_body=radius_l location_in_parent=(-0.008545467 -0.2290976 -0.01322085)
          orientation_in_parent=(1.570796 0 1.570796) location=(0 0 0) orientation=(1.570796 0 1.570796)
        Coordinate wrist_flex_l: motion_type=rotational default_value=0 range=(-1.22173 1.22173) clamped=true
            locked=true
        Coordinate wrist_dev_l: motion_type=rotational default_value=0 range=(-0.4363323 0.6108652) clamped=true
            locked=true
  ConstraintSet:
    CoordinateCouplerConstraint patellofemoral_knee_angle_r_con: independent_coordinate_names=knee_angle_r
        dependent_coordinate_name=knee_angle_r_beta scale_factor=1
        coupled_coordinates_function=LinearFunction(coefficients=1 0)
    CoordinateCouplerConstraint patellofemoral_knee_angle_l_con: independent_coordinate_names=knee_angle_l
        dependent_coordinate_name=knee_angle_l_beta scale_factor=1
        coupled_coordinates_function=LinearFunction(coefficients=1 0)
  ForceSet:
    Millard2012EquilibriumMuscle [values shared by the 80 below unless stated]: fiber_damping=0.01
        default_activation=0.01 minimum_activation=0.01
      ActiveForceLengthCurve: min_norm_active_fiber_length=0.25 transition_norm_fiber_length=0.77
          max_norm_active_fiber_length=1.9 shallow_ascending_slope=0.75 minimum_value=0
      ForceVelocityCurve: concentric_slope_at_vmax=0 concentric_slope_near_vmax=0.25 isometric_slope=5
          eccentric_slope_at_vmax=0 eccentric_slope_near_vmax=0.15 max_eccentric_velocity_force_multiplier=1.4
      FiberForceLengthCurve: strain_at_zero_force=0 strain_at_one_norm_force=0.7
      TendonForceLengthCurve
    Millard2012EquilibriumMuscle addbrev_r: max_isometric_force=625.8197 optimal_fiber_length=0.1037654
        tendon_slack_length=0.03567909 pennation_angle_at_optimal=0.1147809 ignore_tendon_compliance=true
      PathPoint P1: pelvis (-0.0187395 -0.0880785 0.0155501)
      PathPoint P2: femur_r (-0.00200048 -0.118029 0.024906)
      PathWrap: wrap_object=AB_at_femshaft_r method=hybrid
    Millard2012EquilibriumMuscle addlong_r: max_isometric_force=916.8 optimal_fiber_length=0.1085058
        tendon_slack_length=0.1321719 pennation_angle_at_optimal=0.1377704
      PathPoint P1: pelvis (-0.00743693 -0.0832998 0.019064)
      PathPoint P2: femur_r (0.0112627 -0.239428 0.0158338)
      PathWrap: wrap_object=AL_at_femshaft_r method=hybrid
    Millard2012EquilibriumMuscle addmagDist_r: max_isometric_force=597.2951 optimal_fiber_length=0.1796601
        tendon_slack_length=0.08859379 pennation_angle_at_optimal=0.194705 ignore_tendon_compliance=true
      PathPoint P1: pelvis (-0.0726425 -0.119627 0.040208)
      PathPoint P2: femur_r (0.0112527 -0.262563 0.0193047)
      PathWrap: wrap_object=AMdist_at_femshaft_r method=hybrid
      PathWrap: wrap_object=Post_at_pelvis_r method=hybrid
    Millard2012EquilibriumMuscle addmagIsch_r: max_isometric_force=597.2951 optimal_fiber_length=0.157685
        tendon_slack_length=0.2183998 pennation_angle_at_optimal=0.1680443
      PathPoint P1: pelvis (-0.0879285 -0.121586 0.0421165)
      PathPoint P2: femur_r (0.00481116 -0.388064 -0.0327379)
      PathWrap: wrap_object=AMisch_at_condyles_r method=hybrid
      PathWrap: wrap_object=Post_at_pelvis_r method=hybrid
    Millard2012EquilibriumMuscle addmagMid_r: max_isometric_force=597.2951 optimal_fiber_length=0.1401306
        tendon_slack_length=0.04745075 pennation_angle_at_optimal=0.2073076 ignore_tendon_compliance=true
      PathPoint P1: pelvis (-0.0516661 -0.113143 0.0288181)
      PathPoint P2: femur_r (0.00242059 -0.162439 0.0292271)
      PathWrap: wrap_object=AMmid_at_femshaft_r method=hybrid
      PathWrap: wrap_object=Post_at_pelvis_r method=hybrid
    Millard2012EquilibriumMuscle addmagProx_r: max_isometric_force=597.2951 optimal_fiber_length=0.1066327
        tendon_slack_length=0.04071845 pennation_angle_at_optimal=0.3114833 ignore_tendon_compliance=true
      PathPoint P1: pelvis (-0.0303953 -0.100775 0.013783)
      PathPoint P2: femur_r (-0.0152737 -0.0788791 0.0320277)
      PathWrap: wrap_object=AMprox_at_femshaft_r method=hybrid
    Millard2012EquilibriumMuscle bflh_r: max_isometric_force=1313.184 optimal_fiber_length=0.09751703
        tendon_slack_length=0.3249502 pennation_angle_at_optimal=0.1759182
      PathPoint P1: pelvis (-0.102037 -0.111597 0.059171)
      PathPoint P2: tibia_r (-0.0315084 -0.0327238 0.0236547)
      PathPoint P3: tibia_r (-0.0268335 -0.042541 0.0283295)
      PathWrap: wrap_object=Post_at_pelvis_r method=hybrid
    Millard2012EquilibriumMuscle bfsh_r: max_isometric_force=557.1148 optimal_fiber_length=0.1090559
        tendon_slack_length=0.1046237 pennation_angle_at_optimal=0.2642232 ignore_tendon_compliance=true
      PathPoint P1: femur_r (0.00500121 -0.211151 0.0234057)
      PathPoint P2: tibia_r (-0.0281425 -0.0391751 0.0297319)
      PathWrap: wrap_object=BF_at_gastroc_r method=hybrid
    Millard2012EquilibriumMuscle edl_r: max_isometric_force=603.4982 optimal_fiber_length=0.06506958
        tendon_slack_length=0.3463573 pennation_angle_at_optimal=0.2182582
      PathPoint P1: tibia_r (-0.0149595 -0.108176 0.0191668)
      PathPoint P2: tibia_r (0.0153335 -0.351547 0.0104716)
      PathPoint P3: calcn_r (0.086888 0.0340366 0.00075637)
      PathPoint P4: calcn_r (0.152787 0.00520004 0.012291)
      PathPoint P5: toes_r (0.000283639 0.00444367 0.0144656)
      PathPoint P6: toes_r (0.041884 -0.000378185 0.0236366)
    Millard2012EquilibriumMuscle ehl_r: max_isometric_force=285.8675 optimal_fiber_length=0.07027296
        tendon_slack_length=0.307017 pennation_angle_at_optimal=0.1972681
      PathPoint P1: tibia_r (-0.0130895 -0.14492 0.0176709)
      PathPoint P2: tibia_r (0.00663826 -0.271982 0.0153335)
      PathPoint P3: tibia_r (0.0186993 -0.345283 -0.00261791)
      PathPoint P4: calcn_r (0.0917098 0.0367785 -0.0199493)
      PathPoint P5: calcn_r (0.122248 0.0292148 -0.0242984)
      PathPoint P6: calcn_r (0.163943 0.0131419 -0.0264729)
      PathPoint P7: toes_r (0.0281748 0.00387639 -0.0231638)
      PathPoint P8: toes_r (0.0532295 0.00321457 -0.0175856)
    Millard2012EquilibriumMuscle fdl_r: max_isometric_force=423.177 optimal_fiber_length=0.04192964
        tendon_slack_length=0.3560944 pennation_angle_at_optimal=0.2248391
      PathPoint P1: tibia_r (-0.00215042 -0.171286 -0.00168294)
      PathPoint P2: tibia_r (-0.0164554 -0.340795 -0.0115936)
      PathPoint P3: calcn_r (0.0412221 0.0297821 -0.0264729)
      PathPoint P4: calcn_r (0.0669387 0.0166401 -0.0248657)
      PathPoint P5: calcn_r (0.156758 -0.00765824 0.0109674)
      PathPoint P6: toes_r (-0.00179638 -0.0073746 0.0138983)
      PathPoint P7: toes_r (0.0269457 -0.00671278 0.0203274)
      PathPoint P8: toes_r (0.0416949 -0.00567277 0.0228802)
    Millard2012EquilibriumMuscle fhl_r: max_isometric_force=907.8393 optimal_fiber_length=0.04957274
        tendon_slack_length=0.3333129 pennation_angle_at_optimal=0.2580255
      PathPoint P1: tibia_r (-0.028984 -0.202233 0.0186993)
      PathPoint P2: tibia_r (-0.0226262 -0.343226 -0.00710575)
      PathPoint P3: calcn_r (0.0353603 0.0260948 -0.0227856)
      PathPoint P4: calcn_r (0.098139 0.00642914 -0.0242038)
      PathPoint P5: calcn_r (0.163187 -0.00501095 -0.0254329)
      PathPoint P6: toes_r (0.0146547 -0.00605096 -0.0250547)
      PathPoint P7: toes_r (0.053135 -0.00964371 -0.0171129)
    Millard2012EquilibriumMuscle gaslat_r: max_isometric_force=1575.059 optimal_fiber_length=0.05520019
        tendon_slack_length=0.3530467 pennation_angle_at_optimal=0.2102268
      PathPoint P1: femur_r (-0.00300073 -0.381492 0.0277067)
      PathPoint P2: calcn_r (0.00416003 0.0293093 -0.00501095)
      PathWrap shank: wrap_object=GasLat_at_shank_r method=hybrid
      PathWrap condyles: wrap_object=Gastroc_at_condyles_r method=hybrid
    Millard2012EquilibriumMuscle gasmed_r: max_isometric_force=3115.515 optimal_fiber_length=0.04794959
        tendon_slack_length=0.3748684 pennation_angle_at_optimal=0.1656816
      PathPoint P1: femur_r (0.00800194 -0.378892 -0.020805)
      PathPoint P2: calcn_r (0.00416003 0.0293093 -0.00501095)
      PathWrap shank: wrap_object=GasMed_at_shank_r method=hybrid
      PathWrap condyles: wrap_object=Gastroc_at_condyles_r method=hybrid
    Millard2012EquilibriumMuscle glmax1_r: max_isometric_force=983.7836 optimal_fiber_length=0.1417588
        tendon_slack_length=0.04709948 pennation_angle_at_optimal=0.3540118 ignore_tendon_compliance=true
      PathPoint P1: pelvis (-0.120777 0.0323267 0.0568486)
      PathPoint P2: pelvis (-0.123327 -0.0226755 0.0786591)
      PathPoint P3: femur_r (-0.0444107 -0.0326079 0.0302073)
      PathPoint P4: femur_r (-0.0277067 -0.0566137 0.0470114)
      PathWrap: wrap_object=Gmax1_at_pelvis_r method=hybrid
    Millard2012EquilibriumMuscle glmax2_r: max_isometric_force=1406.046 optimal_fiber_length=0.1532181
        tendon_slack_length=0.06625187 pennation_angle_at_optimal=0.3673821 ignore_tendon_compliance=true
      PathPoint P1: pelvis (-0.129214 0.00815195 0.0466502)
      PathPoint P2: pelvis (-0.131863 -0.0570636 0.0820922)
      PathPoint P3: femur_r (-0.0450109 -0.0584141 0.0252061)
      PathPoint P4: femur_r (-0.0156038 -0.101625 0.0419101)
      PathWrap: wrap_object=Gmax2_at_pelvis_r method=hybrid
    Millard2012EquilibriumMuscle glmax3_r: max_isometric_force=947.7541 optimal_fiber_length=0.1652795
        tendon_slack_length=0.06899835 pennation_angle_at_optimal=0.3824161 ignore_tendon_compliance=true
      PathPoint P1: pelvis (-0.127546 -0.0491928 0.0090877)
      PathPoint P2: pelvis (-0.124897 -0.118344 0.0439239)
      PathPoint P3: femur_r (-0.0281068 -0.112527 0.00940227)
      PathPoint P4: femur_r (-0.00600145 -0.141934 0.0411099)
      PathWrap: wrap_object=Gmax3_at_pelvis_r method=hybrid
    Millard2012EquilibriumMuscle glmed1_r: max_isometric_force=1093.467 optimal_fiber_length=0.06920294
        tendon_slack_length=0.05291355 pennation_angle_at_optimal=0.3165559 ignore_tendon_compliance=true
      PathPoint P1: pelvis (-0.0436601 0.0229566 0.118342)
      PathPoint P2: femur_r (-0.0218053 -0.0117028 0.0555134)
      PathWrap: wrap_object=Gmed_at_pelvis_r method=hybrid
    Millard2012EquilibriumMuscle glmed2_r: max_isometric_force=765.0917 optimal_fiber_length=0.06966447
        tendon_slack_length=0.06226745 pennation_angle_at_optimal=0.3165559 ignore_tendon_compliance=true
      PathPoint P1: pelvis (-0.0833957 0.0296094 0.0681578)
      PathPoint P2: femur_r (-0.0258062 -0.0058014 0.0527127)
      PathWrap: wrap_object=Gmed_at_pelvis_r method=hybrid
    Millard2012EquilibriumMuscle glmed3_r: max_isometric_force=871.1993 optimal_fiber_length=0.07095903
        tendon_slack_length=0.0439682 pennation_angle_at_optimal=0.3165559 ignore_tendon_compliance=true
      PathPoint P1: pelvis (-0.113026 -0.00684014 0.0531126)
      PathPoint P2: femur_r (-0.0309075 -0.00470114 0.0518125)
      PathWrap: wrap_object=Gmed_at_pelvis_r method=hybrid
    Millard2012EquilibriumMuscle glmin1_r: max_isometric_force=374.0459 optimal_fiber_length=0.06485648
        tendon_slack_length=0.01539176 pennation_angle_at_optimal=0.1745329 ignore_tendon_compliance=true
      PathPoint P1: pelvis (-0.0455242 -0.0139614 0.105215)
      PathPoint P2: femur_r (-0.00720174 -0.0104025 0.0560135)
    Millard2012EquilibriumMuscle glmin2_r: max_isometric_force=394.8197 optimal_fiber_length=0.05351021
        tendon_slack_length=0.02493868 pennation_angle_at_optimal=0 ignore_tendon_compliance=true
      PathPoint P1: pelvis (-0.0604373 -0.0133055 0.0980462)
      PathPoint P2: femur_r (-0.00960232 -0.0104025 0.0560135)
    Millard2012EquilibriumMuscle glmin3_r: max_isometric_force=446.7738 optimal_fiber_length=0.03663496
        tendon_slack_length=0.04904506 pennation_angle_at_optimal=0.01745329
      PathPoint P1: pelvis (-0.0774108 -0.0145236 0.0805776)
      PathPoint P2: femur_r (-0.0135033 -0.00830201 0.0550133)
    Millard2012EquilibriumMuscle grac_r: max_isometric_force=281.3115 optimal_fiber_length=0.2268232
        tendon_slack_length=0.1712762 pennation_angle_at_optimal=0.1720016 ignore_tendon_compliance=true
      PathPoint P1: pelvis (-0.0464661 -0.121174 0.0247993)
      PathPoint P2: tibia_r (-0.0172221 -0.0444577 -0.0276844)
      PathPoint P3: tibia_r (0.00166424 -0.0650924 -0.014707)
      PathWrap: wrap_object=GR_at_condyles_r method=hybrid
    Millard2012EquilibriumMuscle iliacus_r: max_isometric_force=1021.141 optimal_fiber_length=0.1027765
        tendon_slack_length=0.09267311 pennation_angle_at_optimal=0.279914 ignore_tendon_compliance=true
      PathPoint P1: pelvis (-0.0593581 0.0289535 0.0851215)
      PathPoint P2: pelvis (-0.0132452 -0.0521912 0.0763367)
      PathPoint P3: femur_r (-0.00230056 -0.0565137 0.0139034)
      PathPoint P4: femur_r (-0.012203 -0.0637154 0.0196047)
      PathWrap: wrap_object=IL_at_brim_r method=hybrid range=(2 3)
    Millard2012EquilibriumMuscle perbrev_r: max_isometric_force=521.2016 optimal_fiber_length=0.04254526
        tendon_slack_length=0.138251 pennation_angle_at_optimal=0.2052361
      PathPoint P1: tibia_r (-0.0227197 -0.236734 0.0234677)
      PathPoint P2: tibia_r (-0.0316954 -0.363982 0.0232807)
      PathPoint P3: tibia_r (-0.0266465 -0.374361 0.0238416)
      PathPoint P4: calcn_r (0.0445313 0.0255275 0.0220293)
      PathPoint P5: calcn_r (0.0640078 0.0207056 0.0324293)
    Millard2012EquilibriumMuscle perlong_r: max_isometric_force=1115.371 optimal_fiber_length=0.04766074
        tendon_slack_length=0.3116907 pennation_angle_at_optimal=0.2479525
      PathPoint P1: tibia_r (-0.0186993 -0.128371 0.0263661)
      PathPoint P2: tibia_r (-0.0296384 -0.364637 0.0221587)
      PathPoint P3: tibia_r (-0.0254311 -0.375296 0.0224392)
      PathPoint P4: calcn_r (0.0414112 0.0217456 0.0208947)
      PathPoint P5: calcn_r (0.064386 0.0100219 0.0268511)
      PathPoint P6: calcn_r (0.0805534 0.00652369 0.0111565)
      PathPoint P7: calcn_r (0.113739 0.00803643 -0.0173965)
    Millard2012EquilibriumMuscle piri_r: max_isometric_force=1029.787 optimal_fiber_length=0.02558967
        tendon_slack_length=0.1130928 pennation_angle_at_optimal=0.1745329
      PathPoint P1: pelvis (-0.0998884 -0.00611865 0.0136417)
      PathPoint P3: femur_r (-0.0148036 -0.00360087 0.0437106)
      PathWrap: wrap_object=PIRI_at_Ischium method=hybrid
    Millard2012EquilibriumMuscle psoas_r: max_isometric_force=1426.79 optimal_fiber_length=0.1122926
        tendon_slack_length=0.09561987 pennation_angle_at_optimal=0.2155251 ignore_tendon_compliance=true
      PathPoint P1: pelvis (-0.0594562 0.0580943 0.03938)
      PathPoint P2: pelvis (-0.0201131 -0.0612802 0.0662393)
      PathPoint P3: femur_r (-0.0132032 -0.0467113 0.00460111)
      PathPoint P4: femur_r (-0.0235057 -0.0524127 0.00880213)
      PathWrap: wrap_object=PS_at_brim_r method=hybrid range=(2 3)
    Millard2012EquilibriumMuscle recfem_r: max_isometric_force=2191.741 optimal_fiber_length=0.07514747
        tendon_slack_length=0.4440469 pennation_angle_at_optimal=0.2170149
      PathPoint P1: pelvis (-0.023547 -0.0363558 0.0942092)
      PathPoint P2: patella_r (0.01 0.049 0.0007)
      PathPoint P3: patella_r (0.0121 0.0437 -0.001)
      PathPoint P4: patella_r (0.005 0.00247 3e-5)
      PathPoint P5: tibia_r (0.0304799 -0.0590151 -0.000439434)
      PathWrap: wrap_object=KnExt_at_fem_r method=hybrid
      PathWrap: wrap_object=Flex_at_femhead_r method=hybrid
    Millard2012EquilibriumMuscle sart_r: max_isometric_force=249.4131 optimal_fiber_length=0.3956862
        tendon_slack_length=0.1217494 pennation_angle_at_optimal=0.02613542 ignore_tendon_compliance=true
      PathPoint P1: pelvis (-0.0191319 -0.0146173 0.106629)
      PathPoint P2: femur_r (-0.00300073 -0.356886 -0.0421102)
      PathPoint P3: tibia_r (-0.0234677 -0.0374922 -0.0341263)
      PathPoint P4: tibia_r (-0.014866 -0.0560045 -0.0246831)
      PathPoint P5: tibia_r (0.0127155 -0.0757323 -0.00243091)
      PathWrap: wrap_object=Flex_at_femhead_r method=hybrid
    Millard2012EquilibriumMuscle semimem_r: max_isometric_force=2200.987 optimal_fiber_length=0.06896749
        tendon_slack_length=0.3474222 pennation_angle_at_optimal=0.2545615
      PathPoint P1: pelvis (-0.0968371 -0.106819 0.0619983)
      PathPoint P2: tibia_r (-0.027114 -0.0389881 -0.0183253)
      PathWrap: wrap_object=SM_at_condyles_r method=hybrid
      PathWrap: wrap_object=Post_at_pelvis_r method=hybrid
    Millard2012EquilibriumMuscle semiten_r: max_isometric_force=591.2951 optimal_fiber_length=0.1917412
        tendon_slack_length=0.2455867 pennation_angle_at_optimal=0.241295
      PathPoint P1: pelvis (-0.101841 -0.117407 0.0520019)
      PathPoint P2: tibia_r (-0.029171 -0.0474963 -0.0214107)
      PathPoint P3: tibia_r (0.00177644 -0.0722729 -0.0109391)
      PathWrap: wrap_object=ST_at_condyles_r method=hybrid
      PathWrap: wrap_object=Post_at_pelvis_r method=hybrid
    Millard2012EquilibriumMuscle soleus_r: max_isometric_force=6194.843 optimal_fiber_length=0.04116318
        tendon_slack_length=0.2589125 pennation_angle_at_optimal=0.3814289
      PathPoint P1: tibia_r (-0.00710575 -0.0856429 0.00916267)
      PathPoint P2: calcn_r (0.00416003 0.0293093 -0.00501095)
    Millard2012EquilibriumMuscle tfl_r: max_isometric_force=411.2066 optimal_fiber_length=0.09350791
        tendon_slack_length=0.4424372 pennation_angle_at_optimal=0.05235988
      PathPoint P1: pelvis (-0.030513 0.0200519 0.125309)
      PathPoint P2: femur_r (0.0294071 -0.0995241 0.0597144)
      PathPoint P3: femur_r (0.0107026 -0.405098 0.0324078)
      PathPoint P4: tibia_r (0.0100976 -0.0383336 0.0323498)
    Millard2012EquilibriumMuscle tibant_r: max_isometric_force=1227.452 optimal_fiber_length=0.06399445
        tendon_slack_length=0.2253026 pennation_angle_at_optimal=0.1951828
      PathPoint P1: tibia_r (0.0143985 -0.122668 0.0151465)
      PathPoint P2: tibia_r (0.0234677 -0.178205 0.0119676)
      PathPoint P3: tibia_r (0.0217847 -0.342104 -0.0123416)
      PathPoint P4: calcn_r (0.110241 0.0168292 -0.0288366)
    Millard2012EquilibriumMuscle tibpost_r: max_isometric_force=1730.154 optimal_fiber_length=0.03540351
        tendon_slack_length=0.2629784 pennation_angle_at_optimal=0.2264891
      PathPoint P1: tibia_r (-0.00383336 -0.12192 0.00963016)
      PathPoint P2: tibia_r (-0.0153335 -0.34173 -0.0163619)
      PathPoint P3: calcn_r (0.0394258 0.0315784 -0.0270402)
      PathPoint P4: calcn_r (0.0729897 0.0150328 -0.0265675)
    Millard2012EquilibriumMuscle vasint_r: max_isometric_force=1697.361 optimal_fiber_length=0.09835825
        tendon_slack_length=0.2002929 pennation_angle_at_optimal=0.06309973
      PathPoint P1: femur_r (0.029007 -0.192447 0.0310075)
      PathPoint P2: femur_r (0.0335081 -0.20845 0.0285069)
      PathPoint P3: patella_r (0.0058 0.048 -0.0006)
      PathPoint P4: patella_r (0.005 0.00247 -0.00039)
      PathPoint P5: tibia_r (0.0304519 -0.0590899 0.000402036)
      PathWrap: wrap_object=KnExt_at_fem_r method=hybrid
    Millard2012EquilibriumMuscle vaslat_r: max_isometric_force=5148.767 optimal_fiber_length=0.09850891
        tendon_slack_length=0.2186237 pennation_angle_at_optimal=0.2528673
      PathPoint P1: femur_r (0.00480116 -0.185445 0.0349084)
      PathPoint P2: femur_r (0.0269065 -0.259163 0.0409099)
      PathPoint P3: patella_r (0.0103 0.0423 0.0141)
      PathPoint P4: patella_r (0.005 0.00247 0.00733)
      PathPoint P5: tibia_r (0.0304238 -0.0592582 0.00477768)
      PathWrap: wrap_object=KnExtVL_at_fem_r method=hybrid
    Millard2012EquilibriumMuscle vasmed_r: max_isometric_force=2747.823 optimal_fiber_length=0.09584009
        tendon_slack_length=0.1979219 pennation_angle_at_optimal=0.4222225
      PathPoint P1: femur_r (0.0140034 -0.209951 0.0188045)
      PathPoint P2: femur_r (0.0356086 -0.276967 0.000900218)
      PathPoint P3: patella_r (0.0063 0.0445 -0.017)
      PathPoint P4: patella_r (0.005 0.00247 -0.0085)
      PathPoint P5: tibia_r (0.0298254 -0.0594358 -0.00633907)
      PathWrap: wrap_object=KnExt_at_fem_r method=hybrid
    Millard2012EquilibriumMuscle addbrev_l: max_isometric_force=625.8197 optimal_fiber_length=0.1031838
        tendon_slack_length=0.03547912 pennation_angle_at_optimal=0.1147809 ignore_tendon_compliance=true
      PathPoint P1: pelvis (-0.0187395 -0.0880785 -0.0155501)
      PathPoint P2: femur_l (-0.00198511 -0.117122 -0.0247146)
      PathWrap: wrap_object=AB_at_femshaft_l method=hybrid
    Millard2012EquilibriumMuscle addlong_l: max_isometric_force=916.8 optimal_fiber_length=0.107728
        tendon_slack_length=0.1312244 pennation_angle_at_optimal=0.1377704
      PathPoint P1: pelvis (-0.00743693 -0.0832998 -0.019064)
      PathPoint P2: femur_l (0.0111762 -0.237588 -0.0157122)
      PathWrap: wrap_object=AL_at_femshaft_l method=hybrid
    Millard2012EquilibriumMuscle addmagDist_l: max_isometric_force=597.2951 optimal_fiber_length=0.1780792
        tendon_slack_length=0.08781426 pennation_angle_at_optimal=0.194705 ignore_tendon_compliance=true
      PathPoint P1: pelvis (-0.0726425 -0.119627 -0.040208)
      PathPoint P2: femur_l (0.0111662 -0.260546 -0.0191563)
      PathWrap: wrap_object=AMdist_at_femshaft_l method=hybrid
      PathWrap: wrap_object=Post_at_pelvis_l method=hybrid
    Millard2012EquilibriumMuscle addmagIsch_l: max_isometric_force=597.2951 optimal_fiber_length=0.156317
        tendon_slack_length=0.2165051 pennation_angle_at_optimal=0.1680443
      PathPoint P1: pelvis (-0.0879285 -0.121586 -0.0421165)
      PathPoint P2: femur_l (0.00477419 -0.385082 0.0324863)
      PathWrap: wrap_object=AMisch_at_condyles_l method=hybrid
      PathWrap: wrap_object=Post_at_pelvis_l method=hybrid
    Millard2012EquilibriumMuscle addmagMid_l: max_isometric_force=597.2951 optimal_fiber_length=0.1390027
        tendon_slack_length=0.04706883 pennation_angle_at_optimal=0.2073076 ignore_tendon_compliance=true
      PathPoint P1: pelvis (-0.0516661 -0.113143 -0.0288181)
      PathPoint P2: femur_l (0.00240198 -0.161191 -0.0290025)
      PathWrap: wrap_object=AMmid_at_femshaft_l method=hybrid
      PathWrap: wrap_object=Post_at_pelvis_l method=hybrid
    Millard2012EquilibriumMuscle addmagProx_l: max_isometric_force=597.2951 optimal_fiber_length=0.1061567
        tendon_slack_length=0.04053668 pennation_angle_at_optimal=0.3114833 ignore_tendon_compliance=true
      PathPoint P1: pelvis (-0.0303953 -0.100775 -0.013783)
      PathPoint P2: femur_l (-0.0151563 -0.0782729 -0.0317816)
      PathWrap: wrap_object=AMprox_at_femshaft_l method=hybrid
    Millard2012EquilibriumMuscle bflh_l: max_isometric_force=1313.184 optimal_fiber_length=0.09695083
        tendon_slack_length=0.3230635 pennation_angle_at_optimal=0.1759182
      PathPoint P1: pelvis (-0.102037 -0.111597 -0.059171)
      PathPoint P2: tibia_l (-0.0320318 -0.0332674 -0.0240476)
      PathPoint P3: tibia_l (-0.0272793 -0.0432476 -0.0288001)
      PathWrap: wrap_object=Post_at_pelvis_l method=hybrid
    Millard2012EquilibriumMuscle bfsh_l: max_isometric_force=557.1148 optimal_fiber_length=0.1086589
        tendon_slack_length=0.1042428 pennation_angle_at_optimal=0.2642232 ignore_tendon_compliance=true
      PathPoint P1: femur_l (0.00496278 -0.209528 -0.0232258)
      PathPoint P2: tibia_l (-0.02861 -0.0398258 -0.0302258)
      PathWrap: wrap_object=BF_at_gastroc_l method=hybrid
    Millard2012EquilibriumMuscle edl_l: max_isometric_force=603.4982 optimal_fiber_length=0.06521995
        tendon_slack_length=0.3471576 pennation_angle_at_optimal=0.2182582
      PathPoint P1: tibia_l (-0.015208 -0.109973 -0.0194852)
      PathPoint P2: tibia_l (0.0155882 -0.357387 -0.0106456)
      PathPoint P3: calcn_l (0.0850742 0.0333261 -0.00074058)
      PathPoint P4: calcn_l (0.149597 0.00509149 -0.0120344)
      PathPoint P5: toes_l (0.000277718 0.00435091 -0.0141636)
      PathPoint P6: toes_l (0.0410096 -0.00037029 -0.0231431)
    Millard2012EquilibriumMuscle ehl_l: max_isometric_force=285.8675 optimal_fiber_length=0.07030446
        tendon_slack_length=0.3071546 pennation_angle_at_optimal=0.1972681
      PathPoint P1: tibia_l (-0.013307 -0.147327 -0.0179644)
      PathPoint P2: tibia_l (0.00674853 -0.2765 -0.0155882)
      PathPoint P3: tibia_l (0.01901 -0.351019 0.00266139)
      PathPoint P4: calcn_l (0.0897954 0.0360107 0.0195328)
      PathPoint P5: calcn_l (0.119696 0.0286049 0.0237911)
      PathPoint P6: calcn_l (0.160521 0.0128676 0.0259203)
      PathPoint P7: toes_l (0.0275866 0.00379547 0.0226803)
      PathPoint P8: toes_l (0.0521183 0.00314747 0.0172185)
    Millard2012EquilibriumMuscle fdl_l: max_isometric_force=423.177 optimal_fiber_length=0.04184939
        tendon_slack_length=0.3554129 pennation_angle_at_optimal=0.2248391
      PathPoint P1: tibia_l (-0.00218614 -0.174131 0.0017109)
      PathPoint P2: tibia_l (-0.0167288 -0.346456 0.0117862)
      PathPoint P3: calcn_l (0.0403616 0.0291604 0.0259203)
      PathPoint P4: calcn_l (0.0655414 0.0162928 0.0243466)
      PathPoint P5: calcn_l (0.153485 -0.00749838 -0.0107384)
      PathPoint P6: toes_l (-0.00175888 -0.00722066 -0.0136082)
      PathPoint P7: toes_l (0.0263832 -0.00657265 -0.0199031)
      PathPoint P8: toes_l (0.0408245 -0.00555435 -0.0224026)
    Millard2012EquilibriumMuscle fhl_l: max_isometric_force=907.8393 optimal_fiber_length=0.04938356
        tendon_slack_length=0.3320409 pennation_angle_at_optimal=0.2580255
      PathPoint P1: tibia_l (-0.0294654 -0.205593 -0.01901)
      PathPoint P2: tibia_l (-0.023002 -0.348928 0.00722378)
      PathPoint P3: calcn_l (0.0346221 0.02555 0.02231)
      PathPoint P4: calcn_l (0.0960903 0.00629493 0.0236986)
      PathPoint P5: calcn_l (0.15978 -0.00490634 0.024902)
      PathPoint P6: toes_l (0.0143487 -0.00592464 0.0245317)
      PathPoint P7: toes_l (0.0520258 -0.0094424 0.0167556)
    Millard2012EquilibriumMuscle gaslat_l: max_isometric_force=1575.059 optimal_fiber_length=0.05598933
        tendon_slack_length=0.3580938 pennation_angle_at_optimal=0.2102268
      PathPoint P1: femur_l (-0.00297767 -0.378561 -0.0274938)
      PathPoint P2: calcn_l (0.00407319 0.0286975 0.00490634)
      PathWrap shank: wrap_object=GasLat_at_shank_l method=hybrid
      PathWrap condyles: wrap_object=Gastroc_at_condyles_l method=hybrid
    Millard2012EquilibriumMuscle gasmed_l: max_isometric_force=3115.515 optimal_fiber_length=0.04861192
        tendon_slack_length=0.3800464 pennation_angle_at_optimal=0.1656816
      PathPoint P1: femur_l (0.00794044 -0.37598 0.0206452)
      PathPoint P2: calcn_l (0.00407319 0.0286975 0.00490634)
      PathWrap shank: wrap_object=GasMed_at_shank_l method=hybrid
      PathWrap condyles: wrap_object=Gastroc_at_condyles_l method=hybrid
    Millard2012EquilibriumMuscle glmax1_l: max_isometric_force=983.7836 optimal_fiber_length=0.1413956
        tendon_slack_length=0.04697883 pennation_angle_at_optimal=0.3540118 ignore_tendon_compliance=true
      PathPoint P1: pelvis (-0.120777 0.0323267 -0.0568486)
      PathPoint P2: pelvis (-0.123327 -0.0226755 -0.0786591)
      PathPoint P3: femur_l (-0.0440695 -0.0323573 -0.0299752)
      PathPoint P4: femur_l (-0.0274938 -0.0561786 -0.0466501)
      PathWrap: wrap_object=Gmax1_at_pelvis_l method=hybrid
    Millard2012EquilibriumMuscle glmax2_l: max_isometric_force=1406.046 optimal_fiber_length=0.1526871
        tendon_slack_length=0.06602223 pennation_angle_at_optimal=0.3673821 ignore_tendon_compliance=true
      PathPoint P1: pelvis (-0.129214 0.00815195 -0.0466502)
      PathPoint P2: pelvis (-0.131863 -0.0570636 -0.0820922)
      PathPoint P3: femur_l (-0.044665 -0.0579652 -0.0250124)
      PathPoint P4: femur_l (-0.0154839 -0.100844 -0.0415881)
      PathWrap: wrap_object=Gmax2_at_pelvis_l method=hybrid
    Millard2012EquilibriumMuscle glmax3_l: max_isometric_force=947.7541 optimal_fiber_length=0.1645526
        tendon_slack_length=0.06869491 pennation_angle_at_optimal=0.3824161 ignore_tendon_compliance=true
      PathPoint P1: pelvis (-0.127546 -0.0491928 -0.0090877)
      PathPoint P2: pelvis (-0.124897 -0.118344 -0.0439239)
      PathPoint P3: femur_l (-0.0278908 -0.111662 -0.00933002)
      PathPoint P4: femur_l (-0.00595533 -0.140844 -0.040794)
      PathWrap: wrap_object=Gmax3_at_pelvis_l method=hybrid
    Millard2012EquilibriumMuscle glmed1_l: max_isometric_force=1093.467 optimal_fiber_length=0.06908784
        tendon_slack_length=0.05282554 pennation_angle_at_optimal=0.3165559 ignore_tendon_compliance=true
      PathPoint P1: pelvis (-0.0436601 0.0229566 -0.118342)
      PathPoint P2: femur_l (-0.0216377 -0.0116129 -0.0550868)
      PathWrap: wrap_object=Gmed_at_pelvis_l method=hybrid
    Millard2012EquilibriumMuscle glmed2_l: max_isometric_force=765.0917 optimal_fiber_length=0.06953364
        tendon_slack_length=0.06215051 pennation_angle_at_optimal=0.3165559 ignore_tendon_compliance=true
      PathPoint P1: pelvis (-0.0833957 0.0296094 -0.0681578)
      PathPoint P2: femur_l (-0.0256079 -0.00575682 -0.0523077)
      PathWrap: wrap_object=Gmed_at_pelvis_l method=hybrid
    Millard2012EquilibriumMuscle glmed3_l: max_isometric_force=871.1993 optimal_fiber_length=0.07079747
        tendon_slack_length=0.0438681 pennation_angle_at_optimal=0.3165559 ignore_tendon_compliance=true
      PathPoint P1: pelvis (-0.113026 -0.00684014 -0.0531126)
      PathPoint P2: femur_l (-0.03067 -0.00466501 -0.0514144)
      PathWrap: wrap_object=Gmed_at_pelvis_l method=hybrid
    Millard2012EquilibriumMuscle glmin1_l: max_isometric_force=374.0459 optimal_fiber_length=0.06465304
        tendon_slack_length=0.01534348 pennation_angle_at_optimal=0.1745329 ignore_tendon_compliance=true
      PathPoint P1: pelvis (-0.0455242 -0.0139614 -0.105215)
      PathPoint P2: femur_l (-0.0071464 -0.0103226 -0.0555831)
    Millard2012EquilibriumMuscle glmin2_l: max_isometric_force=394.8197 optimal_fiber_length=0.0533286
        tendon_slack_length=0.02485404 pennation_angle_at_optimal=0 ignore_tendon_compliance=true
      PathPoint P1: pelvis (-0.0604373 -0.0133055 -0.0980462)
      PathPoint P2: femur_l (-0.00952853 -0.0103226 -0.0555831)
    Millard2012EquilibriumMuscle glmin3_l: max_isometric_force=446.7738 optimal_fiber_length=0.03650795
        tendon_slack_length=0.04887502 pennation_angle_at_optimal=0.01745329
      PathPoint P1: pelvis (-0.0774108 -0.0145236 -0.0805776)
      PathPoint P2: femur_l (-0.0133995 -0.00823821 -0.0545905)
    Millard2012EquilibriumMuscle grac_l: max_isometric_force=281.3115 optimal_fiber_length=0.2258411
        tendon_slack_length=0.1705347 pennation_angle_at_optimal=0.1720016 ignore_tendon_compliance=true
      PathPoint P1: pelvis (-0.0464661 -0.121174 -0.0247993)
      PathPoint P2: tibia_l (-0.0175082 -0.0451962 0.0281442)
      PathPoint P3: tibia_l (0.00169189 -0.0661736 0.0149513)
      PathWrap: wrap_object=GR_at_condyles_l method=hybrid
    Millard2012EquilibriumMuscle iliacus_l: max_isometric_force=1021.141 optimal_fiber_length=0.1025395
        tendon_slack_length=0.09245938 pennation_angle_at_optimal=0.279914 ignore_tendon_compliance=true
      PathPoint P1: pelvis (-0.0593581 0.0289535 -0.0851215)
      PathPoint P2: pelvis (-0.0132452 -0.0521912 -0.0763367)
      PathPoint P3: femur_l (-0.00228288 -0.0560794 -0.0137965)
      PathPoint P4: femur_l (-0.0121092 -0.0632258 -0.0194541)
      PathWrap: wrap_object=IL_at_brim_l method=hybrid range=(2 3)
    Millard2012EquilibriumMuscle perbrev_l: max_isometric_force=521.2016 optimal_fiber_length=0.04292626
        tendon_slack_length=0.1394891 pennation_angle_at_optimal=0.2052361
      PathPoint P1: tibia_l (-0.0230971 -0.240666 -0.0238575)
      PathPoint P2: tibia_l (-0.0322219 -0.370029 -0.0236674)
      PathPoint P3: tibia_l (-0.0270892 -0.380579 -0.0242377)
      PathPoint P4: calcn_l (0.0436017 0.0249946 -0.0215694)
      PathPoint P5: calcn_l (0.0626716 0.0202734 -0.0317524)
    Millard2012EquilibriumMuscle perlong_l: max_isometric_force=1115.371 optimal_fiber_length=0.04789958
        tendon_slack_length=0.3132526 pennation_angle_at_optimal=0.2479525
      PathPoint P1: tibia_l (-0.01901 -0.130503 -0.026804)
      PathPoint P2: tibia_l (-0.0301308 -0.370694 -0.0225268)
      PathPoint P3: tibia_l (-0.0258535 -0.38153 -0.0228119)
      PathPoint P4: calcn_l (0.0405468 0.0212917 -0.0204585)
      PathPoint P5: calcn_l (0.0630419 0.00981269 -0.0262906)
      PathPoint P6: calcn_l (0.0788718 0.00638751 -0.0109236)
      PathPoint P7: calcn_l (0.111365 0.00786867 0.0170333)
    Millard2012EquilibriumMuscle piri_l: max_isometric_force=1029.787 optimal_fiber_length=0.02553705
        tendon_slack_length=0.1128602 pennation_angle_at_optimal=0.1745329
      PathPoint P1: pelvis (-0.0998884 -0.00611865 -0.0136417)
      PathPoint P2: pelvis (-0.100094 -0.0287286 -0.0615136)
      PathPoint P3: femur_l (-0.0146898 -0.0035732 -0.0433747)
    Millard2012EquilibriumMuscle psoas_l: max_isometric_force=1426.79 optimal_fiber_length=0.1120766
        tendon_slack_length=0.09543594 pennation_angle_at_optimal=0.2155251 ignore_tendon_compliance=true
      PathPoint P1: pelvis (-0.0594562 0.0580943 -0.03938)
      PathPoint P2: pelvis (-0.0201131 -0.0612802 -0.0662393)
      PathPoint P3: femur_l (-0.0131017 -0.0463523 -0.00456575)
      PathPoint P4: femur_l (-0.0233251 -0.0520099 -0.00873449)
      PathWrap: wrap_object=PS_at_brim_l method=hybrid range=(2 3)
    Millard2012EquilibriumMuscle recfem_l: max_isometric_force=2191.741 optimal_fiber_length=0.07475131
        tendon_slack_length=0.4417059 pennation_angle_at_optimal=0.2170149
      PathPoint P1: pelvis (-0.023547 -0.0363558 -0.0942092)
      PathPoint P2: patella_l (0.01 0.049 -0.0007)
      PathPoint P3: patella_l (0.0121 0.0437 0.001)
      PathPoint P4: patella_l (0.005 0.00247 -3e-5)
      PathPoint P5: tibia_l (0.0309862 -0.0599954 0.000446734)
      PathWrap: wrap_object=KnExt_at_fem_l method=hybrid
      PathWrap: wrap_object=Flex_at_femhead_l method=hybrid
    Millard2012EquilibriumMuscle sart_l: max_isometric_force=249.4131 optimal_fiber_length=0.3946279
        tendon_slack_length=0.1214238 pennation_angle_at_optimal=0.02613542 ignore_tendon_compliance=true
      PathPoint P1: pelvis (-0.0191319 -0.0146173 -0.106629)
      PathPoint P2: femur_l (-0.00297767 -0.354144 0.0417866)
      PathPoint P3: tibia_l (-0.0238575 -0.038115 0.0346932)
      PathPoint P4: tibia_l (-0.0151129 -0.0569348 0.0250931)
      PathPoint P5: tibia_l (0.0129268 -0.0769903 0.00247129)
      PathWrap: wrap_object=Flex_at_femhead_l method=hybrid
    Millard2012EquilibriumMuscle semimem_l: max_isometric_force=2200.987 optimal_fiber_length=0.06854244
        tendon_slack_length=0.345281 pennation_angle_at_optimal=0.2545615
      PathPoint P1: pelvis (-0.0968371 -0.106819 -0.0619983)
      PathPoint P2: tibia_l (-0.0275644 -0.0396357 0.0186298)
      PathWrap: wrap_object=SM_at_condyles_l method=hybrid
      PathWrap: wrap_object=Post_at_pelvis_l method=hybrid
    Millard2012EquilibriumMuscle semiten_l: max_isometric_force=591.2951 optimal_fiber_length=0.1910168
        tendon_slack_length=0.2446588 pennation_angle_at_optimal=0.241295
      PathPoint P1: pelvis (-0.101841 -0.117407 -0.0520019)
      PathPoint P2: tibia_l (-0.0296555 -0.0482853 0.0217664)
      PathPoint P3: tibia_l (0.00180595 -0.0734735 0.0111208)
      PathWrap: wrap_object=ST_at_condyles_l method=hybrid
      PathWrap: wrap_object=Post_at_pelvis_l method=hybrid
    Millard2012EquilibriumMuscle soleus_l: max_isometric_force=6194.843 optimal_fiber_length=0.04176406
        tendon_slack_length=0.262692 pennation_angle_at_optimal=0.3814289
      PathPoint P1: tibia_l (-0.00722378 -0.0870656 -0.00931488)
      PathPoint P2: calcn_l (0.00407319 0.0286975 0.00490634)
    Millard2012EquilibriumMuscle tfl_l: max_isometric_force=411.2066 optimal_fiber_length=0.09305112
        tendon_slack_length=0.4402758 pennation_angle_at_optimal=0.05235988
      PathPoint P1: pelvis (-0.030513 0.0200519 -0.125309)
      PathPoint P2: femur_l (0.0291811 -0.0987593 -0.0592556)
      PathPoint P3: femur_l (0.0106203 -0.401985 -0.0321588)
      PathPoint P4: tibia_l (0.0102654 -0.0389704 -0.0328872)
    Millard2012EquilibriumMuscle tibant_l: max_isometric_force=1227.452 optimal_fiber_length=0.06460102
        tendon_slack_length=0.2274382 pennation_angle_at_optimal=0.1951828
      PathPoint P1: tibia_l (0.0146377 -0.124705 -0.0153981)
      PathPoint P2: tibia_l (0.0238575 -0.181165 -0.0121664)
      PathPoint P3: tibia_l (0.0221466 -0.347787 0.0125466)
      PathPoint P4: calcn_l (0.10794 0.0164779 0.0282346)
    Millard2012EquilibriumMuscle tibpost_l: max_isometric_force=1730.154 optimal_fiber_length=0.03578357
        tendon_slack_length=0.2658015 pennation_angle_at_optimal=0.2264891
      PathPoint P1: tibia_l (-0.00389704 -0.123945 -0.00979012)
      PathPoint P2: tibia_l (-0.0155882 -0.347407 0.0166337)
      PathPoint P3: calcn_l (0.0386028 0.0309192 0.0264757)
      PathPoint P4: calcn_l (0.071466 0.014719 0.0260129)
    Millard2012EquilibriumMuscle vasint_l: max_isometric_force=1697.361 optimal_fiber_length=0.09793608
        tendon_slack_length=0.1994332 pennation_angle_at_optimal=0.06309973
      PathPoint P1: femur_l (0.0287841 -0.190968 -0.0307692)
      PathPoint P2: femur_l (0.0332506 -0.206849 -0.0282878)
      PathPoint P3: patella_l (0.0058 0.048 0.0006)
      PathPoint P4: patella_l (0.005 0.00247 0.00039)
      PathPoint P5: tibia_l (0.0309577 -0.0600714 -0.000408714)
      PathWrap: wrap_object=KnExt_at_fem_l method=hybrid
    Millard2012EquilibriumMuscle vaslat_l: max_isometric_force=5148.767 optimal_fiber_length=0.09807071
        tendon_slack_length=0.2176511 pennation_angle_at_optimal=0.2528673
      PathPoint P1: femur_l (0.00476427 -0.18402 -0.0346402)
      PathPoint P2: femur_l (0.0266997 -0.257171 -0.0405955)
      PathPoint P3: patella_l (0.0103 0.0423 -0.0141)
      PathPoint P4: patella_l (0.005 0.00247 -0.00733)
      PathPoint P5: tibia_l (0.0309292 -0.0602425 -0.00485704)
      PathWrap: wrap_object=KnExtVL_at_fem_l method=hybrid
    Millard2012EquilibriumMuscle vasmed_l: max_isometric_force=2747.823 optimal_fiber_length=0.09545585
        tendon_slack_length=0.1971284 pennation_angle_at_optimal=0.4222225
      PathPoint P1: femur_l (0.0138958 -0.208337 -0.01866)
      PathPoint P2: femur_l (0.035335 -0.274839 -0.0008933)
      PathPoint P3: patella_l (0.0063 0.0445 0.017)
      PathPoint P4: patella_l (0.005 0.00247 0.0085)
      PathPoint P5: tibia_l (0.0303209 -0.0604231 0.00644437)
      PathWrap: wrap_object=KnExt_at_fem_l method=hybrid
    CoordinateActuator lumbar_ext: coordinate=lumbar_extension optimal_force=10
    CoordinateActuator lumbar_bend: coordinate=lumbar_bending optimal_force=10
    CoordinateActuator lumbar_rot: coordinate=lumbar_rotation optimal_force=10
    CoordinateActuator shoulder_flex_r: coordinate=arm_flex_r optimal_force=10
    CoordinateActuator shoulder_add_r: coordinate=arm_add_r optimal_force=10
    CoordinateActuator shoulder_rot_r: coordinate=arm_rot_r optimal_force=10
    CoordinateActuator elbow_flex_r: coordinate=elbow_flex_r optimal_force=10
    CoordinateActuator pro_sup_r: coordinate=pro_sup_r optimal_force=10
    CoordinateActuator wrist_flex_r: coordinate=wrist_flex_r optimal_force=10
    CoordinateActuator wrist_dev_r: coordinate=wrist_dev_r optimal_force=10
    CoordinateActuator shoulder_flex_l: coordinate=arm_flex_l optimal_force=10
    CoordinateActuator shoulder_add_l: coordinate=arm_add_l optimal_force=10
    CoordinateActuator shoulder_rot_l: coordinate=arm_rot_l optimal_force=10
    CoordinateActuator elbow_flex_l: coordinate=elbow_flex_l optimal_force=10
    CoordinateActuator pro_sup_l: coordinate=pro_sup_l optimal_force=10
    CoordinateActuator wrist_flex_l: coordinate=wrist_flex_l optimal_force=10
    CoordinateActuator wrist_dev_l: coordinate=wrist_dev_l optimal_force=10
    ObjectGroup right_leg: members=(addbrev_r addlong_r addmagDist_r addmagIsch_r addmagMid_r addmagProx_r bflh_r bfsh_r edl_r ehl_r fdl_r fhl_r gaslat_r gasmed_r glmax1_r glmax2_r glmax3_r glmed1_r glmed2_r glmed3_r glmin1_r glmin2_r glmin3_r grac_r iliacus_r perbrev_r perlong_r piri_r psoas_r recfem_r sart_r semimem_r semiten_r soleus_r tfl_r tibant_r tibpost_r vasint_r vaslat_r vasmed_r)
    ObjectGroup left_leg: members=(addbrev_l addlong_l addmagDist_l addmagIsch_l addmagMid_l addmagProx_l bflh_l bfsh_l edl_l ehl_l fdl_l fhl_l gaslat_l gasmed_l glmax1_l glmax2_l glmax3_l glmed1_l glmed2_l glmed3_l glmin1_l glmin2_l glmin3_l grac_l iliacus_l perbrev_l perlong_l piri_l psoas_l recfem_l sart_l semimem_l semiten_l soleus_l tfl_l tibant_l tibpost_l vasint_l vaslat_l vasmed_l)
    ObjectGroup hip_add_r: members=(addbrev_r addlong_r addmagDist_r addmagIsch_r addmagMid_r addmagProx_r bflh_r grac_r semimem_r semiten_r)
    ObjectGroup hip_abd_r: members=(glmax1_r glmed1_r glmed2_r glmed3_r glmin1_r glmin2_r glmin3_r piri_r sart_r tfl_r)
    ObjectGroup hip_flex_r: members=(addbrev_r addlong_r glmin1_r grac_r iliacus_r psoas_r recfem_r sart_r tfl_r)
    ObjectGroup hip_ext_r: members=(addlong_r addmagDist_r addmagIsch_r addmagMid_r addmagProx_r bflh_r glmax1_r glmax2_r glmax3_r glmed1_r glmed2_r glmed3_r glmin3_r semimem_r semiten_r)
    ObjectGroup hip_inrot_r: members=(glmed1_r glmed2_r glmed3_r glmin1_r iliacus_r psoas_r tfl_r)
    ObjectGroup hip_exrot_r: members=(glmin3_r piri_r)
    ObjectGroup knee_flex_r: members=(bflh_r bfsh_r gaslat_r gasmed_r grac_r sart_r semimem_r semiten_r)
    ObjectGroup knee_ext_r: members=(recfem_r vasint_r vaslat_r vasmed_r)
    ObjectGroup ankle_df_r: members=(edl_r ehl_r tibant_r)
    ObjectGroup ankle_pf_r: members=(fdl_r fhl_r gaslat_r gasmed_r perbrev_r perlong_r soleus_r tibpost_r)
    ObjectGroup everter_r: members=(edl_r perbrev_r perlong_r)
    ObjectGroup inverter_r: members=(ehl_r fdl_r fhl_r tibant_r tibpost_r)
    ObjectGroup hip_add_l: members=(addbrev_l addlong_l addmagDist_l addmagIsch_l addmagMid_l addmagProx_l bflh_l grac_l semimem_l semiten_l)
    ObjectGroup hip_abd_l: members=(glmax1_l glmed1_l glmed2_l glmed3_l glmin1_l glmin2_l glmin3_l piri_l sart_l tfl_l)
    ObjectGroup hip_flex_l: members=(addbrev_l addlong_l glmin1_l grac_l iliacus_l psoas_l recfem_l sart_l tfl_l)
    ObjectGroup hip_ext_l: members=(addlong_l addmagDist_l addmagIsch_l addmagMid_l addmagProx_l bflh_l glmax1_l glmax2_l glmax3_l glmed1_l glmed2_l glmed3_l glmin3_l semimem_l semiten_l)
    ObjectGroup hip_exrot_l: members=(glmin3_l piri_l)
    ObjectGroup hip_inrot_l: members=(glmed1_l glmed2_l glmed3_l glmin1_l iliacus_l psoas_l tfl_l)
    ObjectGroup knee_flex_l: members=(bflh_l bfsh_l gaslat_l gasmed_l grac_l sart_l semimem_l semiten_l)
    ObjectGroup knee_ext_l: members=(recfem_l vasint_l vaslat_l vasmed_l)
    ObjectGroup ankle_df_l: members=(edl_l ehl_l tibant_l)
    ObjectGroup ankle_pf_l: members=(fdl_l fhl_l gaslat_l gasmed_l perbrev_l perlong_l soleus_l tibpost_l)
    ObjectGroup everter_l: members=(edl_l perbrev_l perlong_l)
    ObjectGroup inverter_l: members=(ehl_l fdl_l fhl_l tibant_l tibpost_l)
  MarkerSet:
    Marker FHD: torso (0.0894946 0.597564 -0.0029527) fixed=true
    Marker LBHD: torso (-0.0846928 0.583998 -0.0719805)
    Marker RBHD: torso (-0.0670601 0.580182 0.0809013)
    Marker C7: torso (-0.0824122 0.421756 0.0016039) fixed=true
    Marker T10: torso (-0.0474824 0.100376 -0.00522828)
    Marker CLAV: torso (0.0471876 0.357869 0.000446024) fixed=true
    Marker LSHO: torso (-0.00242676 0.409911 -0.145155) fixed=true
    Marker LUUPA: humerus_l (0.00317744 -0.161406 -0.0358213)
    Marker LMUPA: humerus_l (0.0426919 -0.180954 -0.0115124)
    Marker LDUPA: humerus_l (0.000855457 -0.229487 -0.0208632)
    Marker LLEP: humerus_l (0.0143241 -0.267383 -0.0381975) fixed=true
    Marker LMEP: humerus_l (0.00214866 -0.273112 0.0439272) fixed=true
    Marker LRAD: radius_l (-0.00212306 -0.22591 -0.0437109) fixed=true
    Marker LUL: ulna_l (-0.028591 -0.234685 -0.00579129) fixed=true
    Marker LRFIN: hand_l (-0.0133553 -0.0772352 -0.00924218) fixed=true
    Marker RSHO: torso (-0.00133669 0.408109 0.14376) fixed=true
    Marker RUPA1: humerus_r (0.0215757 -0.175403 0.0420706)
    Marker RMUPA: humerus_r (0.0533214 -0.192362 0.00801128)
    Marker RDUPA: humerus_r (0.0258077 -0.242706 0.0305004)
    Marker RLEP: humerus_r (0.0145937 -0.272415 0.0389164) fixed=true
    Marker RMEP: humerus_r (0.00218905 -0.278253 -0.0447539) fixed=true
    Marker RRAD: radius_r (-0.00365527 -0.227047 0.0461948) fixed=true
    Marker RUL: ulna_r (-0.0283322 -0.238925 0.00776251) fixed=true
    Marker RUFIN: hand_r (-0.0103533 -0.0841342 0.01261) fixed=true
    Marker LASI: pelvis (0.0151571 0.010041 -0.130178) fixed=true
    Marker RASI: pelvis (0.0169555 0.00872352 0.130339) fixed=true
    Marker USACR: pelvis (-0.143518 0.07485 0.0020666) fixed=true
    Marker LSACR: pelvis (-0.152817 0.0515082 -0.020476) fixed=true
    Marker RSACR: pelvis (-0.148958 0.0477405 0.0207669) fixed=true
    Marker LHJC: femur_l (0 0 0) fixed=true
    Marker LTHI1: femur_l (1.20199e-5 -0.158238 -0.0938132)
    Marker LTHI2: femur_l (0.0143774 -0.240146 -0.0776941)
    Marker LTHI3: femur_l (0.0598028 -0.239846 -0.0537373)
    Marker LTHI4: femur_l (-0.0239021 -0.284673 -0.0704598)
    Marker LLFC: femur_l (-3.14218e-5 -0.405828 -0.0467863) fixed=true
    Marker LMFC: femur_l (0 -0.400992 0.0496278) fixed=true
    Marker LKJC: tibia_l (0.00164531 -0.00227074 0.00803361) fixed=true
    Marker LTIB1: tibia_l (0.0219016 -0.11324 -0.0256964)
    Marker LTIB2: tibia_l (-0.0348909 -0.166633 -0.0722163)
    Marker LTIB3: tibia_l (0.00573081 -0.163217 -0.0524183)
    Marker LTIB4: tibia_l (0.0240452 -0.241108 -0.0211353)
    Marker LLMAL: tibia_l (-0.0109636 -0.364946 -0.0448657) fixed=true
    Marker LMMAL: tibia_l (0.00369529 -0.352582 0.0370935) fixed=true
    Marker LAJC: talus_l (0 0 0) fixed=true
    Marker LHEE: calcn_l (-0.0152444 0.0192765 0.00584405) fixed=true
    Marker LMT1: calcn_l (0.182808 0.0135904 0.024308) fixed=true
    Marker LMT2: calcn_l (0.169268 0.011183 -0.013794) fixed=true
    Marker LMT5: calcn_l (0.137941 0.0130437 -0.0498287) fixed=true
    Marker RHJC: femur_r (0 0 0) fixed=true
    Marker RTHI: femur_r (0.0223027 -0.120722 0.100402)
    Marker RTHI2: femur_r (0.0534136 -0.176358 0.0770047)
    Marker RTHI3: femur_r (0.0782718 -0.174483 0.0547943)
    Marker RTHI4: femur_r (0.0147142 -0.25303 0.0753696)
    Marker RLFC: femur_r (0 -0.404098 0.0500121) fixed=true
    Marker RMFC: femur_r (0 -0.404098 -0.0500121) fixed=true
    Marker RKJC: tibia_r (0.00161843 -0.00223364 -0.00790234) fixed=true
    Marker RTIB1: tibia_r (0.0235886 -0.149009 0.00202062)
    Marker RTIB2: tibia_r (-0.0207305 -0.233548 0.0558718)
    Marker RTIB3: tibia_r (0.0195455 -0.230322 0.0300875)
    Marker RTIB4: tibia_r (0.0276633 -0.276568 -0.00579816)
    Marker RLMAL: tibia_r (-0.0177206 -0.364476 0.0436628) fixed=true
    Marker RMMAL: tibia_r (0.00604421 -0.348921 -0.0369775) fixed=true
    Marker RAJC: talus_r (0 0 0) fixed=true
    Marker RHEE: calcn_r (-0.0171686 0.0189576 -0.00449067) fixed=true
    Marker RMT1: calcn_r (0.185953 0.0155675 -0.0248411) fixed=true
    Marker RMT2: calcn_r (0.163786 0.015118 0.00918765) fixed=true
    Marker RMT5: calcn_r (0.133159 0.0142285 0.0514041) fixed=true
