# OpenSim document version 40500
ScaleTool 009:
  mass: 78.4 [kg]
  height: 1800
  age: -1
  ModelScaler:
    apply: true
    scaling_order: measurements manualScale
    marker_file: C:/Git/research_data/Projects/squatting_fais/models/../c3dfiles/009/SJ/SJ_post1.trc
    time_range: 0 0.05
    preserve_mass_distribution: true
    output_scale_file: C:\Git\research_data\Projects\squatting_fais\setupFiles\.\Scale_output.xml
    MeasurementSet:
      Measurement upperarm_l_Y: apply=true
        MarkerPair: markers=(LSHO LLEP)
        MarkerPair: markers=(LSHO LMEP)
        BodyScale humerus_l: axes=(X Y Z)
      Measurement upperarm_l_XZ: apply=false
        MarkerPair: markers=(LMEP LLEP)
      Measurement lowerarm_l_Y: apply=true
        MarkerPair: markers=(LMEP LUL)
        MarkerPair: markers=(LLEP LRAD)
        BodyScale ulna_l: axes=(X Y Z)
        BodyScale radius_l: axes=(X Y Z)
      Measurement lowerarm_l_XZ: apply=false
        MarkerPair: markers=(LRAD LUL)
        MarkerPair: markers=(LLEP LMEP)
      Measurement hand_l_XYZ: apply=true
        MarkerPair: markers=(LRFIN LRAD)
        MarkerPair: markers=(LUL LRAD)
        BodyScale hand_l: axes=(X Y Z)
      Measurement upperarm_r_Y: apply=true
        MarkerPair: markers=(RSHO RLEP)
        BodyScale humerus_r: axes=(X Y Z)
      Measurement upperarm_r_XZ: apply=false
        MarkerPair: markers=(RMEP RLEP)
      Measurement lowerarm_r_Y: apply=true
        MarkerPair: markers=(RMEP RUL)
        MarkerPair: markers=(RLEP RRAD)
        BodyScale ulna_r: axes=(X Y Z)
        BodyScale radius_r: axes=(X Y Z)
      Measurement lowerarm_r_XZ: apply=false
        MarkerPair: markers=(RRAD RUL)
        MarkerPair: markers=(RLEP RMEP)
      Measurement hand_r_XYZ: apply=false
        MarkerPair: markers=(RUFIN RRAD)
        MarkerPair: markers=(RUL RRAD)
      Measurement torso_Y: apply=true
        MarkerPair: markers=(LSHO LSACR)
        MarkerPair: markers=(RSHO RSACR)
        BodyScale torso: axes=(X Y Z)
      Measurement torso_Z: apply=false
        MarkerPair: markers=(RSHO LSHO)
      Measurement Pelvis_X: apply=true
        MarkerPair: markers=(RASI RSACR)
        MarkerPair: markers=(LASI LSACR)
        BodyScale pelvis: axes=X
      Measurement Pelvis_Y: apply=true
        MarkerPair: markers=(LSACR LASI)
        MarkerPair: markers=(RSACR RASI)
        BodyScale pelvis: axes=Y
      Measurement Pelvis_Z: apply=true
        MarkerPair: markers=(RASI LASI)
        BodyScale pelvis: axes=Z
      Measurement thigh_r_Y: apply=true
        MarkerPair: markers=(RASI RLFC)
        BodyScale femur_r: axes=(X Y Z)
      Measurement shank_r_Y: apply=true
        MarkerPair: markers=(RLMAL RLFC)
        BodyScale tibia_r: axes=(X Y Z)
      Measurement foot_r_XYZ: apply=true
        MarkerPair: markers=(RHEE RMT1)
        MarkerPair: markers=(RMT2 RMT1)
        BodyScale talus_r: axes=(X Y Z)
        BodyScale calcn_r: axes=(X Y Z)
        BodyScale toes_r: axes=(X Y Z)
      Measurement foot_l: apply=true
        MarkerPair: markers=(LHEE LMT1)
        BodyScale talus_l: axes=(X Y Z)
        BodyScale calcn_l: axes=(X Y Z)
        BodyScale toes_l: axes=(X Y Z)
    ScaleSet:
      Scale: scales=(1.14724 1.14724 1.14724) segment=femur_r apply=false
      Scale: scales=(0.988523 0.988523 0.988523) segment=tibia_r apply=false
      Scale: scales=(1 1 1) segment=femur_l apply=true
      Scale: scales=(1 1 1) segment=tibia_l apply=true
  MarkerPlacer:
    apply: true
    marker_file: C:/Git/research_data/Projects/squatting_fais/models/../c3dfiles/009/SJ/SJ_post1.trc
    time_range: 0 0.05
    output_motion_file: C:\Git\research_data\Projects\squatting_fais\setupFiles\..\staticElaborations\009_static_output.mot
    output_model_file: C:\Git\research_data\Projects\squatting_fais\setupFiles\..\009_Rajagopal2015_FAI.osim
    output_marker_file: C:\Git\research_data\Projects\squatting_fais\setupFiles\..\staticElaborations\009_static_output.trc
    max_marker_movement: -1
    IKTaskSet:
      IKMarkerTask FHD: apply=true weight=1
      IKMarkerTask LBHD: apply=true weight=1
      IKMarkerTask RBHD: apply=true weight=1
      IKMarkerTask C7: apply=true weight=50
      IKMarkerTask T10: apply=true weight=1
      IKMarkerTask CLAV: apply=true weight=50
      IKMarkerTask LSHO: apply=true weight=50
      IKMarkerTask LLEP: apply=true weight=50
      IKMarkerTask LMEP: apply=true weight=50
      IKMarkerTask LRAD: apply=true weight=50
      IKMarkerTask LUL: apply=true weight=50
      IKMarkerTask LRFIN: apply=true weight=50
      IKMarkerTask RSHO: apply=true weight=50
      IKMarkerTask RLEP: apply=true weight=50
      IKMarkerTask RMEP: apply=true weight=50
      IKMarkerTask RRAD: apply=true weight=50
      IKMarkerTask RUL: apply=true weight=50
      IKMarkerTask RUFIN: apply=true weight=50
      IKMarkerTask LASI: apply=true weight=50
      IKMarkerTask RASI: apply=true weight=50
      IKMarkerTask USACR: apply=true weight=50
      IKMarkerTask LSACR: apply=true weight=50
      IKMarkerTask RSACR: apply=true weight=50
      IKMarkerTask LHJC: apply=false weight=100
      IKMarkerTask LLFC: apply=false weight=50
      IKMarkerTask LMFC: apply=false weight=50
      IKMarkerTask LKJC: apply=false weight=100
      IKMarkerTask LLMAL: apply=true weight=50
      IKMarkerTask LMMAL: apply=false weight=50
      IKMarkerTask LAJC: apply=false weight=100
      IKMarkerTask LHEE: apply=true weight=50
      IKMarkerTask LMT1: apply=true weight=50
      IKMarkerTask LMT2: apply=false weight=50
      IKMarkerTask LMT5: apply=false weight=50
      IKMarkerTask RHJC: apply=false weight=100
      IKMarkerTask RLFC: apply=true weight=50
      IKMarkerTask RMFC: apply=false weight=50
      IKMarkerTask RKJC: apply=false weight=100
      IKMarkerTask RLMAL: apply=true weight=50
      IKMarkerTask RMMAL: apply=false weight=50
      IKMarkerTask RAJC: apply=false weight=100
      IKMarkerTask RHEE: apply=true weight=50
      IKMarkerTask RMT1: apply=true weight=50
      IKMarkerTask RMT2: apply=true weight=50
      IKMarkerTask RMT5: apply=true weight=50
